<?xml version="1.0" encoding="UTF-8"?>
<!--####################################################################
Lake of Constance Hangar
Vickers VC10 for Flightgear
Copyright (C) 2013 M.Kraus

This program is free software: you can redistribute it and/or modify
it under the terms of the GNU General Public License as published by
the Free Software Foundation, either version 3 of the License, or
(at your option) any later version.

This program is distributed in the hope that it will be useful,
but WITHOUT ANY WARRANTY; without even the implied warranty of
MERCHANTABILITY or FITNESS FOR A PARTICULAR PURPOSE.  See the
GNU General Public License for more details.

You should have received a copy of the GNU General Public License
along with this program.  If not, see <http://www.gnu.org/licenses/>.

Every software has a developer, also free software.
As a gesture of courtesy and respect, I would be delighted
if you contacted me before making any changes to this software.
<info (at) marc-kraus.de> April, 2017
########################################################################-->
<!--
  Engine:     			Rolls Royce Conway MK505 RCo10
  Author:   				M.Kraus with Aero-Matic v 0.82

  Inputs:
    name:           Rolls Royce Conway RCo10
    type:           turbine
    thrust:         18000 lb
    augmented?      no
    injected?       no

	Civil Conway Certificated
	THE following text is the first paragraph of a recent announcement by Rolls-Royce Ltd., Derby:
	"The Air Registration Board of Great Britain has granted a full Certificate of Airworthiness to the Rolls-Royce Conway RCo.10 Mk 505,
	by-pass turbojet for use in civil aircraft. The RCo.10 has a guaranteed minimum
	dry thrust of 16,500 lb, but the Certificate of Airworthiness has been granted at a minimum rating of 17,000 lb. This is the
	highest thrust yet certified for a commercial engine. Application will shortly be made to the A.R.B. for certification of the RCo.12
	rating of 17,500 lb guaranteed minimum thrust."
	In 1954 Rolls introduced the first commercial bypass engine, the Rolls-Royce Conway, with a 21,000 lbf (94 kN) thrust aimed at what was then the 		"large end" of the market.
-->

<turbine_engine name="RCo10">
  <milthrust>   18000.0 </milthrust> <!-- need some more power for the final speed in flightgear -->
  <bypassratio>     1.0 </bypassratio>
  <tsfc>            0.8 </tsfc>
  <bleed>           0.03</bleed>
  <idlen1>         30.0 </idlen1>
  <idlen2>         60.0 </idlen2>
  <maxn1>         100.0 </maxn1>
  <maxn2>         100.0 </maxn2>
  <augmented>         0 </augmented>
  <injected>          0 </injected>

  <function name="IdleThrust">
   <table>
    <independentVar lookup="row">velocities/mach</independentVar>
    <independentVar lookup="column">atmosphere/density-altitude</independentVar>
    <tableData>
         -10000     0     10000   20000   30000   40000   50000   60000
     0.0  0.0430  0.0488  0.0528  0.0694  0.0899  0.1183  0.1467  0
     0.2  0.0500  0.0501  0.0335  0.0544  0.0797  0.1049  0.1342  0
     0.4  0.0040  0.0047  0.0020  0.0272  0.0595  0.0891  0.1203  0
     0.6  0.0     0.0     0.0     0.0     0.0276  0.0718  0.1073  0
     0.8  0.0     0.0     0.0     0.0     0.0474  0.0868  0.0900  0
     1.0  0.0     0.0     0.0     0.0     0.0     0.0552  0.0800  0
    </tableData>
   </table>
  </function>

  <function name="MilThrust">
   <table>
    <independentVar lookup="row">velocities/mach</independentVar>
    <independentVar lookup="column">atmosphere/density-altitude</independentVar>
    <tableData>
          -10000       0   10000   20000   30000   40000   50000   60000
     0.0   1.2600  1.0000  0.7400  0.5340  0.3720  0.2410  0.1490  0
     0.2   1.1710  0.9340  0.6970  0.5060  0.3550  0.2310  0.1430  0
     0.4   1.1500  0.9210  0.6920  0.5060  0.3570  0.2330  0.1450  0
     0.6   1.1810  0.9510  0.7210  0.5320  0.3780  0.2480  0.1540  0
     0.8   1.2580  1.0200  0.7820  0.5820  0.4170  0.2750  0.1700  0
     1.0   1.3690  1.1200  0.8710  0.6510  0.4750  0.3150  0.1950  0
     1.2   1.4850  1.2300  0.9750  0.7440  0.5450  0.3640  0.2250  0
     1.4   1.5941  1.3400  1.0860  0.8450  0.6280  0.4240  0.2630  0
    </tableData>
   </table>
  </function>

</turbine_engine>
