<?xml version="1.0"?>

<!-- **********************************************************************
AERODYNAMICS
***************************************************************************-->

<aerodynamics>

<!-- Unless stated otherwise this data has produced by Digital Datcom   -->
<!-- A reference point of 79.07 ft aft of the main fuselage datum has been used. -->

	<axis name="LIFT">  <!-- ########################################################### -->

		<function name="aero/coefficient/CLalpha">
			<description>Lift_due_to_alpha</description>
			<product>
				<property>aero/qbar-psf</property>
				<property>metrics/Sw-sqft</property>
				<table  name="aero/coefficient/CL_alpha">
					<independentVar lookup="row">aero/alpha-deg</independentVar>
					<independentVar lookup="column">velocities/mach</independentVar>
					<tableData>
						0.1	0.2	0.3	0.4	0.5	0.6
						-10	-0.517	-0.519	-0.523	-0.528	-0.537	-0.550
						-8	-0.332	-0.334	-0.337	-0.341	-0.347	-0.356
						-6	-0.151	-0.152	-0.154	-0.156	-0.159	-0.163
						-4	0.026	0.026	0.027	0.028	0.029	0.030
						-2	0.208	0.209	0.211	0.214	0.218	0.225
						0	0.396	0.398	0.400	0.404	0.411	0.421
						2	0.587	0.590	0.592	0.596	0.604	0.617
						4	0.782	0.786	0.786	0.790	0.798	0.813
						6	0.981	0.986	0.984	0.987	0.994	1.009
						8	1.184	1.190	1.185	1.174	1.167	1.168
						10	1.366	1.370	1.345	1.321	1.301	1.292
						12	1.508	1.510	1.470	1.433	1.399	1.377
						14	1.612	1.613	1.557	1.504	1.452	1.439
						16	1.677	1.676	1.601	1.551	1.527	1.500
						18	1.706	1.708	1.652	1.583	1.512	1.490
						20	1.738	1.729	1.592	1.494	1.474	1.493
						22	1.574	1.567	1.468	1.437	1.451	1.515
						24	1.403	1.411	1.375	1.399	1.453	1.537
					</tableData>
				</table>
			</product>
		</function>

		<function name="aero/coefficient/dCLflap">
			<description>Delta_Lift_due_to_flaps</description>
			<product>
				<property>aero/qbar-psf</property>
				<property>metrics/Sw-sqft</property>
				<table name="dCLflap">
					<independentVar>fcs/flap-pos-deg</independentVar>
					<tableData>
						0	0
						20	0.448
						35	0.686
						45	0.733
					</tableData>
				</table>
			</product>
		</function>

		<function name="aero/force/Lift_q">
			<description>
				Lift due to pitch rate
			</description>
			<product>
				<property>velocities/q-aero-rad_sec</property>
				<property>aero/qbar-psf</property>
				<property>metrics/Sw-sqft</property>
				<property>aero/ci2vel</property>
				<table  name="aero/coefficient/CLq">
					<independentVar lookup="row">velocities/mach</independentVar>
					<tableData>
						0.1	0.1468
						0.2	0.1476
						0.3	0.1488
						0.4	0.1505
						0.5	0.1534
						0.6	0.1565
					</tableData>
				</table>
			</product>
		</function>

		<function name="aero/force/Lift_alphadot">
			<description>
				Lift due to AOA rate
			</description>
			<product>
				<property>aero/alphadot-rad_sec</property>
				<property>aero/qbar-psf</property>
				<property>metrics/Sw-sqft</property>
				<property>aero/ci2vel</property>
				<table name="aero/coefficient/CLad">
					<independentVar lookup="row">aero/alpha-deg</independentVar>
					<independentVar lookup="column">velocities/mach</independentVar>
					<tableData>
						0.1	0.2	0.3	0.4	0.5	0.6
						-10	0.0307	0.0309	0.0310	0.0314	0.0320	0.0327
						-8	0.0308	0.0310	0.0312	0.0316	0.0323	0.0330
						-6	0.0312	0.0314	0.0317	0.0321	0.0330	0.0338
						-4	0.0321	0.0323	0.0326	0.0330	0.0338	0.0346
						-2	0.0331	0.0334	0.0336	0.0339	0.0347	0.0354
						0	0.0345	0.0347	0.0348	0.0350	0.0356	0.0362
						2	0.0359	0.0361	0.0360	0.0361	0.0366	0.0369
						4	0.0369	0.0371	0.0369	0.0367	0.0368	0.0369
						6	0.0374	0.0375	0.0370	0.0361	0.0354	0.0346
						8	0.0362	0.0362	0.0347	0.0328	0.0309	0.0290
						10	0.0316	0.0315	0.0287	0.0266	0.0246	0.0230
						12	0.0255	0.0253	0.0227	0.0209	0.0195	0.0189
						14	0.0207	0.0206	0.0187	0.0173	0.0168	0.0171
						16	0.0171	0.0169	0.0149	0.0137	0.0144	0.0146
						18	0.0121	0.0115	0.0081	0.0056	0.0053	0.0107
						20	-0.0035	-0.0034	-0.0023	0.0003	0.0015	0.0113
						22	-0.0157	-0.0145	-0.0111	-0.0009	0.0136	0.0200
						24	-0.0159	-0.0144	-0.0145	-0.0029	0.0222	0.0265
					</tableData>
				</table>
			</product>
		</function>


		<!--			<function name="aero/coefficient/dCLsb">
				<description>Delta_Lift_due_to_speedbrake</description>
				<product>
					<property>aero/qbar-psf</property>
					<property>metrics/Sw-sqft</property>
					<property>fcs/speedbrake-pos-norm</property>
					<value>-0.2</value>
				</product>
			</function> -->

		<!-- the LE slat -->
		<!--			<function name="aero/coefficient/CDLEflap">
				<description>Lift_due_to_leading_edge_flaps</description>
				<product>
					<property>aero/qbar-psf</property>
					<property>metrics/Sw-sqft</property>
					<property>fcs/wing-fold-pos-norm</property>
					<value>0.1</value>
				</product>
			</function>  -->

		<function name="aero/force/Lift_elevator">
			<description>
				Lift due to Elevator Deflection
				Positive surface deflection is trailing edge down
			</description>
			<product>
				<property>aero/qbar-psf</property>
				<property>metrics/Sw-sqft</property>
				<table  name="aero/coefficient/CLDe">
					<independentVar lookup="row">fcs/elevator-pos-deg</independentVar>
					<independentVar lookup="column">velocities/mach</independentVar>
					<tableData>
						0.1	0.2	0.3	0.4	0.5	0.6
						-20	-0.126	-0.126	-0.124	-0.121	-0.116	-0.108
						-15	-0.113	-0.114	-0.112	-0.109	-0.104	-0.097
						-10	-0.077	-0.078	-0.076	-0.074	-0.071	-0.066
						-5	-0.039	-0.039	-0.038	-0.037	-0.036	-0.033
						0	0	0	0	0	0	0
						5	0.039	0.039	0.038	0.037	0.036	0.033
						10	0.077	0.078	0.076	0.074	0.071	0.066
						15	0.113	0.114	0.112	0.109	0.104	0.097
						20	0.126	0.126	0.124	0.121	0.116	0.108
					</tableData>
				</table>
			</product>
		</function>

		<function name="aero/force/Lift_TailTrim">
			<description>
				Lift due to Tail Trim Deflection
				Positive surface deflection is trailing edge down
			</description>
			<product>
				<property>aero/qbar-psf</property>
				<property>metrics/Sw-sqft</property>
				<table  name="aero/coefficient/CL_tailplane">
					<independentVar lookup="row">aero/alpha-deg</independentVar>
					<independentVar lookup="column">fcs/pitch-trim-pos-deg</independentVar>
					<tableData>
						-14	-10	-6	-3	0	3
						-10	-0.105	-0.094	-0.064	-0.035	0	0.033
						-8	-0.119	-0.1	-0.067	-0.035	0	0.034
						-6	-0.13	-0.105	-0.068	-0.034	0	0.034
						-4	-0.138	-0.109	-0.069	-0.034	0	0.033
						-2	-0.145	-0.111	-0.068	-0.033	0	0.032
						0	-0.149	-0.112	-0.067	-0.033	0	0.031
						2	-0.151	-0.112	-0.065	-0.032	0	0.032
						4	-0.152	-0.11	-0.064	-0.031	0	0.032
						6	-0.153	-0.109	-0.063	-0.031	0	0.032
						8	-0.151	-0.106	-0.062	-0.03	0	0.032
						10	-0.148	-0.104	-0.06	-0.03	0	0.032
						12	-0.144	-0.102	-0.06	-0.03	0	0.032
						14	-0.142	-0.101	-0.06	-0.03	0	0.032
						16	-0.139	-0.099	-0.059	-0.029	0	0.032
						18	-0.137	-0.098	-0.059	-0.029	0	0.029
						20	-0.135	-0.097	-0.057	-0.027	0	0.025
						22	-0.131	-0.09	-0.05	-0.021	0	0.02
						24	-0.122	-0.078	-0.039	-0.015	0	0.013
					</tableData>
				</table>
			</product>
		</function>

		<function name="aero/coefficient/CLground">
			<description>Lift_due_ground_reactions</description>
			<product>
				<table  name="aero/coefficient/CL_ground">
					<independentVar lookup="row">aero/alpha-deg</independentVar>
					<independentVar lookup="column">position/h-agl-ft</independentVar>
					<tableData>
						5.0	10.0	20.0	30.0	40.0	50.0	100.0
						-10	-0.4960	-0.3430	-0.1370	-0.0570	-0.0290	-0.0150	0.0000
						-6	-0.2890	-0.2000	-0.0800	-0.0330	-0.0170	-0.0090	0.0000
						-4	-0.0820	-0.0570	-0.0230	-0.0100	-0.0050	-0.0030	0.0000
						-2	0.0780	0.0560	0.0250	0.0110	0.0060	0.0030	0.0000
						0	0.1860	0.1360	0.0620	0.0270	0.0140	0.0080	0.0000
						2	0.2580	0.1910	0.0920	0.0410	0.0210	0.0120	0.0000
						4	0.3010	0.2220	0.1120	0.0500	0.0250	0.0140	0.0000
						6	0.3220	0.2350	0.1230	0.0550	0.0270	0.0150	0.0000
						8	0.3030	0.2240	0.1230	0.0540	0.0250	0.0130	0.0000
						10	0.2390	0.1790	0.1000	0.0430	0.0180	0.0080	0.0000
						12	0.1630	0.1220	0.0670	0.0270	0.0100	0.0030	0.0000
						14	0.0900	0.0720	0.0390	0.0150	0.0040	0.0000	0.0000
						16	0.0220	0.0250	0.0160	0.0060	0.0020	0.0000	0.0000
					</tableData>
				</table>
				<property>aero/qbar-psf</property>
				<property>metrics/Sw-sqft</property>
			</product>
		</function>

		<!--			<function name="aero/coefficient/StabTrim">
				<description>Lift_due_to_stabilizer</description>
				<product>
					<property>aero/qbar-psf</property>
					<property>metrics/Sw-sqft</property>
					<property>/VC10/stabilizer/cutout</property>
					<value>0.2</value>
				</product>
			</function> -->

	</axis>

	<axis name="DRAG"> <!-- ########################################################### -->

		<function name="aero/coefficient/CDalpha">
			<description>Drag_due_to_alpha</description>
			<product>
				<property>aero/qbar-psf</property>
				<property>metrics/Sw-sqft</property>
				<table  name="aero/coefficient/CD_alpha">
					<independentVar lookup="row">aero/alpha-deg</independentVar>
					<independentVar lookup="column">velocities/mach</independentVar>
					<tableData>
						0.1	0.2	0.3	0.4	0.5	0.6
						-10	0.0310	0.0290	0.0290	0.0290	0.0290	0.0300
						-8	0.0220	0.0210	0.0200	0.0200	0.0200	0.0210
						-6	0.0170	0.0160	0.0150	0.0150	0.0150	0.0150
						-4	0.0150	0.0140	0.0140	0.0140	0.0140	0.0140
						-2	0.0170	0.0160	0.0160	0.0160	0.0160	0.0160
						0	0.0230	0.0220	0.0220	0.0220	0.0220	0.0230
						2	0.0330	0.0320	0.0320	0.0320	0.0330	0.0330
						4	0.0470	0.0460	0.0460	0.0460	0.0470	0.0480
						6	0.0660	0.0650	0.0650	0.0650	0.0650	0.0660
						8	0.0890	0.0890	0.0880	0.0860	0.0840	0.0830
						10	0.1140	0.1130	0.1090	0.1050	0.1010	0.0990
						12	0.1360	0.1360	0.1290	0.1230	0.1170	0.1130
						14	0.1570	0.1560	0.1460	0.1380	0.1290	0.1270
						16	0.1750	0.1730	0.1600	0.1530	0.1500	0.1450
						18	0.1900	0.1890	0.1800	0.1690	0.1570	0.1540
						20	0.2110	0.2070	0.1830	0.1700	0.1690	0.1720
						22	0.2000	0.1970	0.1860	0.1840	0.1850	0.1940
						24	0.2040	0.2030	0.1990	0.2020	0.2090	0.2190
					</tableData>
				</table>
			</product>
		</function>


		<!--			<function name="aero/coefficient/CDmach">
				<description>Drag_due_to_mach</description>
				<product>
					<property>aero/qbar-psf</property>
					<property>metrics/Sw-sqft</property>
					<table>
						<independentVar lookup="row">velocities/mach</independentVar>
						<tableData>
							0.00      0.000
							0.79      0.000
							1.10      0.023
							1.80      0.015
						</tableData>
					</table>
				</product>
			</function> -->

		<function name="aero/coefficient/CDflap">
			<description>Drag_due_to_flaps</description>
			<product>
				<property>aero/qbar-psf</property>
				<property>metrics/Sw-sqft</property>
				<table  name="aero/coefficient/CD_Flaps">
					<independentVar lookup="row">aero/alpha-deg</independentVar>
					<independentVar lookup="column">velocities/mach</independentVar>
					<tableData>
						0	20	35	45
						-10	-1.54E-05	-1.63E-02	-1.42E-02	-1.28E-02
						-8	-1.17E-05	-9.33E-03	-3.43E-03	-1.31E-03
						-6	-8.09E-06	-2.33E-03	7.32E-03	1.02E-02
						-4	-4.45E-06	4.67E-03	1.81E-02	2.17E-02
						-2	-8.13E-07	1.17E-02	2.88E-02	3.32E-02
						0	2.82E-06	1.87E-02	3.96E-02	4.47E-02
						2	6.46E-06	2.57E-02	5.03E-02	5.62E-02
						4	1.01E-05	3.27E-02	6.11E-02	6.77E-02
						6	1.37E-05	3.97E-02	7.18E-02	7.92E-02
						8	1.74E-05	4.67E-02	8.26E-02	9.08E-02
						10	2.10E-05	5.37E-02	9.33E-02	1.02E-01
						12	2.47E-05	6.07E-02	1.04E-01	1.14E-01
						14	2.83E-05	6.77E-02	1.15E-01	1.25E-01
						16	3.19E-05	7.47E-02	1.26E-01	1.37E-01
						18	3.55E-05	8.17E-02	1.36E-01	1.48E-01
						20	3.92E-05	8.87E-02	1.47E-01	1.60E-01
						22	4.28E-05	9.57E-02	1.58E-01	1.71E-01
						24	4.65E-05	1.03E-01	1.69E-01	1.83E-01
					</tableData>
				</table>
			</product>
		</function>

		<function name="aero/coefficient/CDgear">
			<description>Drag_due_to_gear</description>
			<product>
				<property>aero/qbar-psf</property>
				<property>metrics/Sw-sqft</property>
				<property>gear/gear-pos-norm</property>
				<value>0.011</value>
			</product>
		</function>

		<!--			<function name="aero/coefficient/CDsb">
				<description>Drag_due_to_speedbrakes</description>
				<product>
					<property>aero/qbar-psf</property>
					<property>metrics/Sw-sqft</property>
					<property>fcs/speedbrake-pos-norm</property>
					<value>0.05</value>
				</product>
			</function> -->


		<!--			<function name="aero/coefficient/CDbeta">
				<description>Drag_due_to_sideslip</description>
				<product>
					<property>aero/qbar-psf</property>
					<property>metrics/Sw-sqft</property>
					<table>
						<independentVar lookup="row">aero/beta-rad</independentVar>
						<tableData>
							-1.57       1.230
							-0.26       0.050
							0.00       0.000
							0.26       0.050
							1.57       1.230
						</tableData>
					</table>
				</product>
			</function> -->

		<!--			<function name="aero/coefficient/CDde">
				<description>Drag_due_to_Elevator_Deflection</description>
				<product>
					<property>aero/qbar-psf</property>
					<property>metrics/Sw-sqft</property>
					<abs>
						<property>fcs/elevator-pos-norm</property>
					</abs>
					<value>0.04</value>
				</product>
			</function> -->
		<function name="aero/coefficient/CDde">
			<description>Drag_due_to_Elevator_Deflection</description>
			<product>
				<property>aero/qbar-psf</property>
				<property>metrics/Sw-sqft</property>
				<table  name="aero/coefficient/CD_Elevator">
					<independentVar lookup="row">aero/alpha-deg</independentVar>
					<independentVar lookup="column">fcs/elevator-pos-deg</independentVar>
					<tableData>
						-20	-15	-10	-5	0	5	10	15	20
						-10	1.53E-02	1.32E-02	7.82E-03	3.26E-03	-5.20E-06	-1.95E-03	-2.59E-03	-2.01E-03	-1.55E-03
						-8	1.38E-02	1.18E-02	6.87E-03	2.78E-03	-4.25E-06	-1.47E-03	-1.64E-03	-6.18E-04	-1.31E-05
						-6	1.23E-02	1.05E-02	5.93E-03	2.31E-03	-3.31E-06	-1.00E-03	-6.92E-04	7.66E-04	1.52E-03
						-4	1.07E-02	9.09E-03	4.99E-03	1.84E-03	-2.37E-06	-5.34E-04	2.40E-04	2.13E-03	3.03E-03
						-2	9.27E-03	7.76E-03	4.08E-03	1.39E-03	-1.46E-06	-7.92E-05	1.15E-03	3.46E-03	4.51E-03
						0	7.82E-03	6.45E-03	3.19E-03	9.42E-04	-5.72E-07	3.67E-04	2.04E-03	4.77E-03	5.96E-03
						2	6.43E-03	5.20E-03	2.33E-03	5.12E-04	2.87E-07	7.96E-04	2.90E-03	6.03E-03	7.35E-03
						4	5.07E-03	3.97E-03	1.49E-03	9.28E-05	1.13E-06	1.22E-03	3.74E-03	7.26E-03	8.71E-03
						6	3.73E-03	2.76E-03	6.72E-04	-3.18E-04	1.95E-06	1.63E-03	4.56E-03	8.46E-03	1.00E-02
						8	2.40E-03	1.56E-03	-1.48E-04	-7.28E-04	2.77E-06	2.04E-03	5.38E-03	9.66E-03	1.14E-02
						10	9.97E-04	2.93E-04	-1.02E-03	-1.16E-03	3.64E-06	2.47E-03	6.25E-03	1.09E-02	1.28E-02
						12	-6.16E-04	-1.16E-03	-2.01E-03	-1.66E-03	4.63E-06	2.97E-03	7.24E-03	1.24E-02	1.44E-02
						14	-2.40E-03	-2.77E-03	-3.11E-03	-2.21E-03	5.73E-06	3.52E-03	8.34E-03	1.40E-02	1.62E-02
						16	-4.31E-03	-4.49E-03	-4.28E-03	-2.80E-03	6.90E-06	4.11E-03	9.52E-03	1.57E-02	1.81E-02
						18	-6.31E-03	-6.30E-03	-5.52E-03	-3.41E-03	8.14E-06	4.72E-03	1.08E-02	1.75E-02	2.01E-02
						20	-8.53E-03	-8.31E-03	-6.89E-03	-4.10E-03	9.51E-06	5.41E-03	1.21E-02	1.95E-02	2.23E-02
						22	-1.15E-02	-1.10E-02	-8.72E-03	-5.01E-03	1.13E-05	6.32E-03	1.39E-02	2.22E-02	2.53E-02
						24	-1.45E-02	-1.37E-02	-1.05E-02	-5.93E-03	1.32E-05	7.24E-03	1.58E-02	2.49E-02	2.83E-02
					</tableData>
				</table>
			</product>
		</function>

		<function name="aero/force/Drag_TailTrim">
			<description>
				Drag due to Tail Trim Deflection
				Positive surface deflection is trailing edge down
			</description>
			<product>
				<property>aero/qbar-psf</property>
				<property>metrics/Sw-sqft</property>
				<table  name="aero/coefficient/CD_tailplane">
					<independentVar lookup="row">aero/alpha-deg</independentVar>
					<independentVar lookup="column">fcs/pitch-trim-pos-deg</independentVar>
					<tableData>
						-14	-10	-6	-3	0	3
						-10	0.023	0.02	0.013	0.006	0	-0.056
						-8	0.022	0.018	0.011	0.005	0	-0.04
						-6	0.021	0.016	0.009	0.004	0	-0.031
						-4	0.02	0.014	0.008	0.003	0	-0.029
						-2	0.018	0.012	0.005	0.002	0	-0.034
						0	0.014	0.009	0.003	0.001	0	-0.047
						2	0.011	0.005	0.001	0	0	-0.068
						4	0.007	0.002	-0.001	-0.001	0	-0.097
						6	0.002	-0.002	-0.003	-0.002	0	-0.136
						8	-0.003	-0.005	-0.005	-0.003	0	-0.185
						10	-0.008	-0.009	-0.008	-0.005	0	-0.236
						12	-0.012	-0.012	-0.009	-0.006	0	-0.281
						14	-0.017	-0.015	-0.011	-0.006	0	-0.323
						16	-0.022	-0.019	-0.014	-0.008	0	-0.359
						18	-0.027	-0.023	-0.016	-0.009	0	-0.39
						20	-0.032	-0.027	-0.019	-0.01	0	-0.429
						22	-0.036	-0.029	-0.019	-0.01	0	-0.406
						24	-0.039	-0.03	-0.018	-0.009	0	-0.414

					</tableData>
				</table>
			</product>
		</function>

		<function name="aero/coefficient/CDground">
			<description>Drag_due_ground_reactions</description>
			<product>
				<table  name="aero/coefficient/CD_ground">
					<independentVar lookup="row">aero/alpha-deg</independentVar>
					<independentVar lookup="column">position/h-agl-ft</independentVar>
					<tableData>
						5.0	10.0	20.0	30.0	40.0	50.0	100.0
						-10	-0.0030	-0.0020	-0.0020	-0.0010	-0.0010	0.0000	0.0000
						-6	-0.0010	0.0000	0.0000	0.0000	0.0000	0.0000	0.0000
						-4	0.0000	0.0000	0.0000	0.0000	0.0000	0.0000	0.0000
						-2	-0.0010	-0.0010	0.0000	0.0000	0.0000	0.0000	0.0000
						0	-0.0030	-0.0020	-0.0010	-0.0010	0.0000	0.0000	0.0000
						2	-0.0080	-0.0060	-0.0040	-0.0030	-0.0020	-0.0010	0.0000
						4	-0.0130	-0.0100	-0.0060	-0.0040	-0.0030	-0.0020	0.0000
						6	-0.0220	-0.0170	-0.0110	-0.0070	-0.0050	-0.0030	0.0000
						8	-0.0340	-0.0270	-0.0170	-0.0110	-0.0080	-0.0050	0.0000
						10	-0.0470	-0.0370	-0.0230	-0.0150	-0.0100	-0.0070	0.0000
						12	-0.0610	-0.0480	-0.0300	-0.0200	-0.0140	-0.0090	0.0000
						14	-0.0690	-0.0550	-0.0340	-0.0220	-0.0150	-0.0100	0.0000
						16	-0.0770	-0.0610	-0.0380	-0.0250	-0.0170	-0.0120	0.0000
					</tableData>
				</table>
				<property>aero/qbar-psf</property>
				<property>metrics/Sw-sqft</property>
			</product>
		</function>

	</axis>

	<axis name="SIDE"> <!-- ########################################################### -->

		<function name="aero/coefficient/CYb">
			<description>Side_force_due_to_beta</description>
			<product>
				<property>aero/qbar-psf</property>
				<property>metrics/Sw-sqft</property>
				<property>aero/beta-rad</property>
				<value>-1</value>
			</product>
		</function>

	</axis>

	<axis name="ROLL"> <!-- ########################################################### -->

		<function name="aero/coefficient/Clb">
			<description>Roll_moment_due_to_beta</description>
			<product>
				<property>aero/qbar-psf</property>
				<property>metrics/Sw-sqft</property>
				<property>metrics/bw-ft</property>
				<property>aero/beta-rad</property>
				<value>-0.1</value>
			</product>
		</function>

		<function name="aero/coefficient/Clp">
			<description>Roll_moment_due_to_roll_rate</description>
			<product>
				<property>aero/qbar-psf</property>
				<property>metrics/Sw-sqft</property>
				<property>metrics/bw-ft</property>
				<property>aero/bi2vel</property>
				<property>velocities/p-aero-rad_sec</property>
				<value>-0.4</value>
			</product>
		</function>

		<function name="aero/coefficient/Clr">
			<description>Roll_moment_due_to_yaw_rate</description>
			<product>
				<property>aero/qbar-psf</property>
				<property>metrics/Sw-sqft</property>
				<property>metrics/bw-ft</property>
				<property>aero/bi2vel</property>
				<property>velocities/r-aero-rad_sec</property>
				<value>0.005</value>
			</product>
		</function>

		<function name="aero/coefficient/Clda">
			<description>Roll_moment_due_to_aileron</description>
			<product>
				<property>aero/qbar-psf</property>
				<property>metrics/Sw-sqft</property>
				<property>metrics/bw-ft</property>
				<property>fcs/left-aileron-pos-rad</property>
				<table>
					<independentVar lookup="row">velocities/mach</independentVar>
					<tableData>
						0.0    0.100
						2.0    0.033
					</tableData>
				</table>
			</product>
		</function>

		<function name="aero/coefficient/Cldr">
			<description>Roll_moment_due_to_rudder</description>
			<product>
				<property>aero/qbar-psf</property>
				<property>metrics/Sw-sqft</property>
				<property>metrics/bw-ft</property>
				<property>fcs/rudder-pos-rad</property>
				<value>0.008</value>
			</product>
		</function>

	</axis>

	<axis name="PITCH"> <!-- ########################################################### -->

		<function name="aero/coefficient/Cmalpha">
			<description>Pitch_moment_due_to_alpha</description>
			<product>
				<property>aero/qbar-psf</property>
				<property>metrics/Sw-sqft</property>
				<property>metrics/cbarw-ft</property>
				<table  name="aero/coefficient/CM_Alpha">
					<independentVar lookup="row">aero/alpha-deg</independentVar>
					<independentVar lookup="column">velocities/mach</independentVar>
					<tableData>
						0.1	0.2	0.3	0.4	0.5	0.6
						-10	0.2650	0.2648	0.2661	0.2681	0.2715	0.2751
						-8	0.2233	0.2234	0.2246	0.2263	0.2292	0.2323
						-6	0.1794	0.1796	0.1808	0.1823	0.1846	0.1872
						-4	0.1352	0.1355	0.1365	0.1376	0.1394	0.1414
						-2	0.0924	0.0927	0.0935	0.0942	0.0953	0.0966
						0	0.0510	0.0513	0.0517	0.0521	0.0526	0.0531
						2	0.0125	0.0126	0.0127	0.0124	0.0120	0.0116
						4	-0.0245	-0.0245	-0.0250	-0.0259	-0.0272	-0.0287
						6	-0.0579	-0.0581	-0.0591	-0.0611	-0.0636	-0.0665
						8	-0.0879	-0.0883	-0.0904	-0.0935	-0.0974	-0.1020
						10	-0.1154	-0.1160	-0.1192	-0.1246	-0.1313	-0.1389
						12	-0.1433	-0.1444	-0.1506	-0.1576	-0.1663	-0.1752
						14	-0.1725	-0.1739	-0.1815	-0.1902	-0.2004	-0.2113
					</tableData>
				</table>
			</product>
		</function>

		<function name="aero/coefficient/Cmde">
			<description>Pitch_moment_due_to_elevator</description>
			<product>
				<property>aero/qbar-psf</property>
				<property>metrics/Sw-sqft</property>
				<property>metrics/cbarw-ft</property>
				<table name="CM_Elevator">
					<independentVar lookup="row">fcs/elevator-pos-deg</independentVar>
					<independentVar lookup="column">velocities/mach</independentVar>
					<tableData>
						0.1	0.2	0.3	0.4	0.5	0.6
						-20	0.3359	0.341	0.3385	0.3246	0.2982	0.2545
						-15	0.3023	0.307	0.3048	0.2922	0.2683	0.2287
						-10	0.2061	0.2093	0.2078	0.1992	0.1829	0.1558
						-5	0.103	0.1046	0.1039	0.0996	0.0914	0.0779
						0	-0.0002	-0.0002	-0.0002	-0.0002	-0.0002	-0.0002
						5	-0.103	-0.1046	-0.1039	-0.0996	-0.0914	-0.0779
						10	-0.2061	-0.2093	-0.2078	-0.1992	-0.1829	-0.1558
						15	-0.3023	-0.307	-0.3048	-0.2922	-0.2683	-0.2287
						20	-0.3368	-0.3421	-0.3396	-0.3257	-0.2992	-0.2553
					</tableData>
				</table>
			</product>
		</function>

		<function name="aero/force/Cm_TailTrim">
			<description>
				Pitch Moment due to Tail Trim Deflection
				Positive surface deflection is trailing edge down
			</description>
			<product>
				<property>aero/qbar-psf</property>
				<property>metrics/Sw-sqft</property>
				<property>metrics/cbarw-ft</property>
				<table  name="aero/coefficient/CM_tailplane">
					<independentVar lookup="row">aero/alpha-deg</independentVar>
					<independentVar lookup="column">fcs/pitch-trim-pos-deg</independentVar>
					<tableData>
						-14	-10	-6	-3	0	3
						-10	0.3371	0.2995	0.2011	0.1087	0	-0.1031
						-8	0.381	0.3201	0.2105	0.109	0	-0.1035
						-6	0.4167	0.3355	0.2162	0.1086	0	-0.1027
						-4	0.443	0.3478	0.2181	0.1068	0	-0.1003
						-2	0.4642	0.3548	0.2151	0.1049	0	-0.0982
						0	0.477	0.3573	0.2115	0.1026	0	-0.0959
						2	0.486	0.3562	0.2072	0.1004	0	-0.0958
						4	0.4904	0.3513	0.2034	0.0983	0	-0.0967
						6	0.4918	0.3461	0.2001	0.0974	0	-0.0988
						8	0.4873	0.3403	0.1964	0.0962	0	-0.1001
						10	0.4783	0.3342	0.1928	0.0963	0	-0.1001
						12	0.468	0.3283	0.1915	0.0961	0	-0.1003
						14	0.4604	0.3246	0.192	0.0963	0	-0.1013

					</tableData>
				</table>
			</product>
		</function>

		<function name="aero/coefficient/Cmq">
			<description>Pitch_moment_due_to_pitch_rate</description>
			<product>
				<property>aero/qbar-psf</property>
				<property>metrics/Sw-sqft</property>
				<property>metrics/cbarw-ft</property>
				<property>aero/ci2vel</property>
				<property>velocities/q-aero-rad_sec</property>
				<table  name="aero/coefficient/CMq">
					<independentVar lookup="row">velocities/mach</independentVar>
					<tableData>
						0.1	-0.2914
						0.2	-0.2921
						0.3	-0.2936
						0.4	-0.2955
						0.5	-0.2994
						0.6	-0.3021
					</tableData>
				</table>
			</product>
		</function>

		<function name="aero/coefficient/Cmadot">
			<description>Pitch_moment_due_to_alpha_rate</description>
			<product>
				<property>aero/qbar-psf</property>
				<property>metrics/Sw-sqft</property>
				<property>metrics/cbarw-ft</property>
				<property>aero/ci2vel</property>
				<property>aero/alphadot-rad_sec</property>
				<table name="aero/coefficient/CMad">
					<independentVar lookup="row">aero/alpha-deg</independentVar>
					<independentVar lookup="column">velocities/mach</independentVar>
					<tableData>
						0.1	0.2	0.3	0.4	0.5	0.6
						-10	-0.0948	-0.0955	-0.0959	-0.0969	-0.0989	-0.1010
						-8	-0.0951	-0.0958	-0.0964	-0.0976	-0.0998	-0.1021
						-6	-0.0964	-0.0971	-0.0979	-0.0994	-0.1019	-0.1045
						-4	-0.0992	-0.1000	-0.1007	-0.1020	-0.1046	-0.1071
						-2	-0.1025	-0.1032	-0.1038	-0.1049	-0.1072	-0.1094
						0	-0.1067	-0.1074	-0.1076	-0.1083	-0.1102	-0.1119
						2	-0.1110	-0.1116	-0.1114	-0.1117	-0.1130	-0.1142
						4	-0.1140	-0.1146	-0.1140	-0.1135	-0.1138	-0.1140
						6	-0.1155	-0.1160	-0.1144	-0.1116	-0.1094	-0.1070
						8	-0.1118	-0.1119	-0.1073	-0.1014	-0.0956	-0.0898
						10	-0.0977	-0.0973	-0.0886	-0.0822	-0.0761	-0.0709
						12	-0.0788	-0.0783	-0.0702	-0.0646	-0.0602	-0.0585
						14	-0.0641	-0.0638	-0.0579	-0.0534	-0.0520	-0.0528
						16	-0.0530	-0.0524	-0.0461	-0.0423	-0.0444	-0.0450
						18	-0.0373	-0.0357	-0.0250	-0.0173	-0.0163	-0.0332
						20	0.0107	0.0106	0.0073	-0.0010	-0.0047	-0.0348
						22	0.0486	0.0449	0.0343	0.0027	-0.0421	-0.0618
						24	0.0492	0.0444	0.0447	0.0090	-0.0686	-0.0820
					</tableData>
				</table>
			</product>
		</function>

		<function name="aero/coefficient/Cmde_inboard">
			<description>Pitch_moment_due_to_inboard_spoiler</description>
			<product>
				<property>aero/qbar-psf</property>
				<property>metrics/Sw-sqft</property>
				<property>metrics/cbarw-ft</property>
				<property>/VC10/trim/spoiler-nose-down</property>
				<table>
					<independentVar>velocities/mach</independentVar>
					<tableData>
						0.0000    -0.06
						0.6000    -0.02
					</tableData>
				</table>
			</product>
		</function>

		<function name="aero/coefficient/Cmde_outboard">
			<description>Pitch_moment_due_to_outboard_spoiler</description>
			<product>
				<property>aero/qbar-psf</property>
				<property>metrics/Sw-sqft</property>
				<property>metrics/cbarw-ft</property>
				<property>/VC10/trim/spoiler-nose-up</property>
				<table>
					<independentVar>velocities/mach</independentVar>
					<tableData>
						0.0000    0.06
						0.6000    0.02
					</tableData>
				</table>
			</product>
		</function>

		<function name="aero/coefficient/CMground">
			<description>Pitch Moment_due_ground_reactions</description>
			<product>
				<table  name="aero/coefficient/CM_ground">
					<independentVar lookup="row">aero/alpha-deg</independentVar>
					<independentVar lookup="column">position/h-agl-ft</independentVar>
					<tableData>
						5.0	10.0	20.0	30.0	40.0	50.0	100
						-10	-0.0186	-0.0129	-0.0052	-0.0022	-0.0011	-0.0006	0.0000
						-6	-0.0109	-0.0075	-0.0030	-0.0013	-0.0007	-0.0004	0.0000
						-4	-0.0031	-0.0021	-0.0009	-0.0004	-0.0002	-0.0001	0.0000
						-2	0.0029	0.0021	0.0009	0.0004	0.0002	0.0001	0.0000
						0	0.0070	0.0051	0.0024	0.0010	0.0006	0.0003	0.0000
						2	0.0097	0.0072	0.0035	0.0016	0.0008	0.0005	0.0000
						4	0.0113	0.0083	0.0042	0.0019	0.0010	0.0005	0.0000
						6	0.0120	0.0088	0.0046	0.0020	0.0010	0.0005	0.0000
						8	0.0113	0.0084	0.0046	0.0020	0.0009	0.0005	0.0000
						10	0.0089	0.0067	0.0037	0.0016	0.0006	0.0002	0.0000
						12	0.0061	0.0046	0.0025	0.0010	0.0003	0.0001	0.0000
						14	0.0034	0.0027	0.0015	0.0006	0.0002	0.0000	0.0000
						16	0.0008	0.0009	0.0006	0.0002	0.0000	-0.0001	0.0000
					</tableData>
				</table>
				<property>aero/qbar-psf</property>
				<property>metrics/Sw-sqft</property>
				<property>metrics/cbarw-ft</property>
			</product>
		</function>

	</axis>

	<axis name="YAW"> <!-- ########################################################### -->

		<function name="aero/coefficient/Cnb">
			<description>Yaw_moment_due_to_beta</description>
			<product>
				<property>aero/qbar-psf</property>
				<property>metrics/Sw-sqft</property>
				<property>metrics/bw-ft</property>
				<property>aero/beta-rad</property>
				<value>0.12</value>
			</product>
		</function>

		<function name="aero/coefficient/Cnr">
			<description>Yaw_moment_due_to_yaw_rate</description>
			<product>
				<property>aero/qbar-psf</property>
				<property>metrics/Sw-sqft</property>
				<property>metrics/bw-ft</property>
				<property>aero/bi2vel</property>
				<property>velocities/r-aero-rad_sec</property>
				<value>-0.15</value>
			</product>
		</function>

		<function name="aero/coefficient/Cndr">
			<description>Yaw_moment_due_to_rudder</description>
			<product>
				<property>aero/qbar-psf</property>
				<property>metrics/Sw-sqft</property>
				<property>metrics/bw-ft</property>
				<property>fcs/rudder-pos-rad</property>
				<value>-0.04</value>
			</product>
		</function>

		<function name="aero/coefficient/Cnda">
			<description>Adverse_yaw</description>
			<product>
				<property>aero/qbar-psf</property>
				<property>metrics/Sw-sqft</property>
				<property>metrics/bw-ft</property>
				<property>fcs/left-aileron-pos-rad</property>
				<value>0</value>
			</product>
		</function>

	</axis>

</aerodynamics>
