<?xml version="1.0"?>

<!-- **********************************************************************
AERODYNAMICS
***************************************************************************-->

<aerodynamics>

	<!-- References
		1. Digital Datcom
		2. OpenVSP
		3. ARA paper C.P. No. 1199 - A Simulator Study of Direct Lift Control 1972.
			A.G.Barnes, D.E.A. Houghton, C. Colclough. Flight Simulator Dept, BAC Warton
			 https://reports.aerade.cranfield.ac.uk/handle/1826.2/1212
		4. Test Pilot - Brian Trubshaw 1998, via http://www.vc10.net/Technical/wing_shapes.html fig 2 and fig 3.
		5. VC10 Type 1106 model drawing A.A.P.Lloyd (Scale 1:192) May 1968 Aeromodeller.
		6. VC10 C Mk1 Pilots Notes - Technical. AP 101B-0201-15A  May 1967.
	-->
	<!-- An aerodynamic reference point of 79.07 ft (948.9") aft of the manufacturer´s fuselage datum has been used.
    This equates to 32% SMC. Roll, pitch and yaw moments are calculated about the aerodynamic reference point. -->

	<!-- The fuselage datum is that defined by Vickers and is 8" aft of the front of the radome.
    and is used for placing and animating objects in the top level model files.
	(VC10model.xml and VC10.ac).	-->

	<!-- Reference 5 was used as the basis for the Digital Datcom and OpenVSP aero analysis, and for the 3d model VC10.ac. 	-->

	<function name="inertia/cg-x-percent">
		<description>cg, percentage of cbar</description>
		<quotient>
			<difference>
				<property>inertia/cg-x-in</property>
				<value>872.0</value><!-- SMC LE is 872 inches aft of fuselage datum-->
			</difference>
			<value>2.402</value><!-- SMC is 240.2 inches, divide by 100 to get % -->
		</quotient>
	</function>

	<axis name="LIFT"><!-- ########################################################### -->

		<function name="aero/force/Lift_alpha">
			<description>Lift_due_to_alpha</description>
			<product>
				<property>aero/qbar-psf</property>
				<property>metrics/Sw-sqft</property>
				<table name="aero/coefficient/CL_alpha">
					<!-- OpenVSP using Peakey wing section -->
					<independentVar lookup="row">aero/alpha-deg</independentVar>
					<tableData>
					-10  -0.45797
                    -8   -0.30181
                    -6   -0.14254
                    -4    0.0186
                    -2    0.18032
                    0     0.34136
                    2     0.50028
                    4     0.65618
                    6     0.80776
                    8     0.95386
                    10    1.09369
                    12    1.2263
                    14    1.35006
                    16    1.46519
					</tableData>
					<!--					<independentVar lookup="row">aero/alpha-deg</independentVar>
					<independentVar lookup="column">velocities/mach</independentVar> -->
					<!-- Datcom using Peakey wing section -->
					<!--					<tableData>
						0.1	0.2	0.3	0.4	0.5	0.6
                     -10	-0.624	-0.627	-0.630	-0.636	-0.647	-0.663
                      -8	-0.432	-0.434	-0.437	-0.443	-0.451	-0.462
                      -6	-0.241	-0.242	-0.245	-0.248	-0.253	-0.260
                      -4	-0.053	-0.053	-0.053	-0.054	-0.055	-0.056
                      -2	0.136	0.137	0.138	0.140	0.144	0.148
                       0	0.327	0.329	0.331	0.336	0.342	0.352
                       2	0.520	0.523	0.525	0.531	0.540	0.553
                       4	0.715	0.718	0.719	0.725	0.735	0.752
                       6	0.912	0.916	0.915	0.921	0.931	0.951
                       8	1.110	1.115	1.107	1.105	1.109	1.123
                       10	1.273	1.276	1.256	1.246	1.243	1.254
                       12	1.396	1.398	1.366	1.347	1.337	1.342
                       14	1.478	1.479	1.434	1.403	1.383	1.391
                       16	1.515	1.514	1.478	1.463	1.463	1.467
                       18	1.569	1.572	1.507	1.467	1.450	1.463
                       20	1.499	1.499	1.434	1.424	1.433	1.470
                       22	1.401	1.410	1.388	1.397	1.436	1.497
                       24	1.324	1.343	1.366	1.402	1.454	1.525
					</tableData>
					-->
					<!-- using wing section NACA 65 410 -->
					<!--					<tableData>
						0.1	0.2	0.3	0.4	0.5	0.6
						-10	-0.355	-0.366	-0.369	-0.373	-0.379	-0.388
						-8	-0.174	-0.184	-0.186	-0.188	-0.191	-0.196
						-6	0.003	-0.006	-0.006	-0.005	-0.005	-0.005
						-4	0.185	0.177	0.178	0.180	0.184	0.189
						-2	0.374	0.366	0.368	0.371	0.377	0.385
						0	0.567	0.560	0.561	0.565	0.572	0.584
						2	0.765	0.758	0.758	0.762	0.770	0.783
						4	0.966	0.959	0.958	0.961	0.968	0.982
						6	1.172	1.165	1.162	1.163	1.165	1.169
						8	1.378	1.372	1.352	1.335	1.322	1.317
						10	1.538	1.533	1.499	1.469	1.443	1.428
						12	1.663	1.660	1.612	1.568	1.527	1.499
						14	1.751	1.749	1.684	1.623	1.573	1.564
						16	1.797	1.796	1.717	1.671	1.638	1.591
						18	1.821	1.822	1.760	1.650	1.569	1.550
						20	1.768	1.771	1.623	1.520	1.498	1.525
						22	1.529	1.542	1.457	1.430	1.450	1.523
						24	1.335	1.358	1.326	1.363	1.429	1.524
					</tableData> -->
					<!-- using wing section NACA 65 210 -->
					<!--					<tableData>
						0.1	0.2	0.3	0.4	0.5	0.6
						-10	-0.517	-0.519	-0.523	-0.528	-0.537	-0.550
						-8	-0.332	-0.334	-0.337	-0.341	-0.347	-0.356
						-6	-0.151	-0.152	-0.154	-0.156	-0.159	-0.163
						-4	0.026	0.026	0.027	0.028	0.029	0.030
						-2	0.208	0.209	0.211	0.214	0.218	0.225
						0	0.396	0.398	0.400	0.404	0.411	0.421
						2	0.587	0.590	0.592	0.596	0.604	0.617
						4	0.782	0.786	0.786	0.790	0.798	0.813
						6	0.981	0.986	0.984	0.987	0.994	1.009
						8	1.184	1.190	1.185	1.174	1.167	1.168
						10	1.366	1.370	1.345	1.321	1.301	1.292
						12	1.508	1.510	1.470	1.433	1.399	1.377
						14	1.612	1.613	1.557	1.504	1.452	1.439
						16	1.677	1.676	1.601	1.551	1.527	1.500
						18	1.706	1.708	1.652	1.583	1.512	1.490
						20	1.738	1.729	1.592	1.494	1.474	1.493
						22	1.574	1.567	1.468	1.437	1.451	1.515
						24	1.403	1.411	1.375	1.399	1.453	1.537
					</tableData> -->
				</table>
			</product>
		</function>

		<!--		<function name="aero/force/LiftaileronsUp">
			<description>Lift_due_to_aileronsUp</description>
			<product>
				<property>aero/qbar-psf</property>
				<property>metrics/Sw-sqft</property>
				<table name="aero/coefficient/CLaileronsUp">
					<independentVar>aero/alpha-deg</independentVar>
					<tableData>
						-10		-0.0187
						-8	-0.01916
						-6	-0.01962
						-4	-0.0199
						-2	-0.02049
						0	-0.02084
						2	-0.02099
						4	-0.02106
						6	-0.02106
						8	-0.0208
						10	-0.02017
						12	-0.01961
						14	-0.01744
						16	-0.01692
						18	-0.01556
						20	-0.01262
					</tableData>
				</table>
			</product>
		</function> -->

		<function name="aero/force/Lift_flap">
			<description>Lift_due_to_flaps</description>
			<product>
				<property>aero/qbar-psf</property>
				<property>metrics/Sw-sqft</property>
				<table name="aero/coefficient/CLflap">
					<independentVar>fcs/flap-pos-deg</independentVar>
					<!-- from  CP 1199 -->
					<tableData>
						0	0
						45	1.05
</tableData>
					<!--  Datcom values
					<tableData>
						0	0
						20	0.474
						35	0.727
						45	0.776
					</tableData> -->
				</table>
			</product>
		</function>

		<function name="aero/force/Lift_q">
			<description>
				Lift due to pitch rate
</description>
			<product>
				<property>velocities/q-aero-rad_sec</property>
				<property>aero/qbar-psf</property>
				<property>metrics/Sw-sqft</property>
				<property>aero/ci2vel</property>
				<table name="aero/derivative/CLq">
					<independentVar lookup="row">velocities/mach</independentVar>
					<tableData>
						0.1	8.4130
						0.2	8.4580
						0.3	8.5230
						0.4	8.6240
						0.5	8.7900
						0.6	8.9690
</tableData>
				</table>
			</product>
		</function>

		<function name="aero/force/Lift_alphadot">
			<description>
				Lift due to AOA rate
</description>
			<product>
				<property>aero/alphadot-rad_sec</property>
				<property>aero/qbar-psf</property>
				<property>metrics/Sw-sqft</property>
				<property>aero/ci2vel</property>
				<table name="aero/derivative/CLad">
					<independentVar lookup="row">aero/alpha-deg</independentVar>
					<independentVar lookup="column">velocities/mach</independentVar>
					<tableData>
						0.1	0.2	0.3	0.4	0.5	0.6
						-10	1.7570	1.7690	1.7780	1.7960	1.8340	1.8710
						-8	1.7620	1.7750	1.7860	1.8080	1.8500	1.8920
						-6	1.7860	1.7990	1.8150	1.8410	1.8890	1.9370
						-4	1.8380	1.8520	1.8660	1.8910	1.9380	1.9850
						-2	1.8990	1.9130	1.9230	1.9440	1.9860	2.0280
						0	1.9760	1.9900	1.9930	2.0080	2.0420	2.0750
						2	2.0560	2.0690	2.0650	2.0700	2.0940	2.1160
						4	2.1120	2.1230	2.1130	2.1030	2.1100	2.1130
						6	2.1400	2.1490	2.1200	2.0690	2.0280	1.9840
						8	2.0720	2.0740	1.9880	1.8790	1.7720	1.6640
						10	1.8100	1.8020	1.6420	1.5230	1.4100	1.3150
						12	1.4600	1.4510	1.3010	1.1970	1.1150	1.0850
						14	1.1870	1.1820	1.0720	0.9896	0.9645	0.9777
						16	0.9816	0.9708	0.8534	0.7834	0.8225	0.8343
						18	0.6909	0.6605	0.4636	0.3208	0.3025	0.6150
						20	-0.1990	-0.1964	-0.1346	0.0191	0.0866	0.6447
						22	-0.9005	-0.8312	-0.6360	-0.0505	0.7807	1.1450
						24	-0.9108	-0.8229	-0.8277	-0.1674	1.2720	1.5200
</tableData>
				</table>
			</product>
		</function>


		<!--			<function name="aero/force/Lift_speedbrake">
				<description>Delta_Lift_due_to_speedbrake</description>
				<product>
					<property>aero/qbar-psf</property>
					<property>metrics/Sw-sqft</property>
					<property>fcs/speedbrake-pos-norm</property>
					<value>-0.2</value>
				</product>
			</function> -->

		<!-- the LE slat -->
		<!--			<function name="aero/force/Lift_slats">
				<description>Lift_due_to_leading_edge_flaps</description>
				<product>
					<property>aero/qbar-psf</property>
					<property>metrics/Sw-sqft</property>
					<property>fcs/wing-fold-pos-norm</property>
					<value>0.1</value>
				</product>
			</function>  -->

		<function name="aero/force/Lift_elevator">
			<description>
				Lift due to Elevator Deflection
				Positive surface deflection is trailing edge down
</description>
			<product>
				<property>aero/qbar-psf</property>
				<property>metrics/Sw-sqft</property>
				<table name="aero/coefficient/CLDe">
					<independentVar lookup="row">fcs/elevator-pos-deg</independentVar>
					<independentVar lookup="column">velocities/mach</independentVar>
					<tableData>
						0.1	0.2	0.3	0.4	0.5	0.6
						-20	-0.126	-0.126	-0.124	-0.121	-0.116	-0.108
						-15	-0.113	-0.114	-0.112	-0.109	-0.104	-0.097
						-10	-0.077	-0.078	-0.076	-0.074	-0.071	-0.066
						-5	-0.039	-0.039	-0.038	-0.037	-0.036	-0.033
						0	0	0	0	0	0	0
						5	0.039	0.039	0.038	0.037	0.036	0.033
						10	0.077	0.078	0.076	0.074	0.071	0.066
						15	0.113	0.114	0.112	0.109	0.104	0.097
						20	0.126	0.126	0.124	0.121	0.116	0.108
</tableData>
				</table>
			</product>
		</function>

		<function name="aero/force/Lift_TailTrim">
			<description>
				Lift due to Tail Trim Deflection
				Positive surface deflection is trailing edge down
</description>
			<product>
				<property>aero/qbar-psf</property>
				<property>metrics/Sw-sqft</property>
				<table name="aero/coefficient/CL_tailplane">
					<independentVar lookup="row">aero/alpha-deg</independentVar>
					<independentVar lookup="column">fcs/pitch-trim-pos-deg</independentVar>
<!--      OpenVSP -->
					<tableData>
							-14		-10		-6		-3		0	3
							-10	-0.13467	-0.09693	-0.06556	-0.03392	0	0.03923
							-8	-0.14173	-0.10204	-0.06783	-0.03492	0	0.03824
							-6	-0.14811	-0.10681	-0.06984	-0.03579	0	0.03763
							-4	-0.15356	-0.11072	-0.07152	-0.03647	0	0.03751
							-2	-0.15867	-0.11421	-0.07291	-0.03701	0	0.03776
							0	-0.16294	-0.11719	-0.07399	-0.03744	0	0.03814
							2	-0.16618	-0.1193		-0.07457	-0.03749	0	0.03913
							4	-0.1688		-0.12099	-0.075		-0.03765	0	0.04029
							6	-0.17081	-0.12224	-0.07513	-0.03757	0	0.04135
							8	-0.17178	-0.1227		-0.07465	-0.03732	0	0.0433
							10	-0.17226	-0.12249	-0.07404	-0.03685	0	0.04508
							12	-0.1722		-0.12232	-0.07355	-0.03653	0	0.04668
							14	-0.17085	-0.12096	-0.07188	-0.03556	0	0.04908
							16	-0.17033	-0.1193		-0.07073	-0.03482	0	0.05093
					</tableData>
<!--      Datcom -->
<!--					<tableData>
							-14		-10		-6		-3		0	3
						-10	-0.105	-0.094	-0.064	-0.035	0	0.033
						-8	-0.119	-0.1	-0.067	-0.035	0	0.034
						-6	-0.13	-0.105	-0.068	-0.034	0	0.034
						-4	-0.138	-0.109	-0.069	-0.034	0	0.033
						-2	-0.145	-0.111	-0.068	-0.033	0	0.032
						0	-0.149	-0.112	-0.067	-0.033	0	0.031
						2	-0.151	-0.112	-0.065	-0.032	0	0.032
						4	-0.152	-0.11	-0.064	-0.031	0	0.032
						6	-0.153	-0.109	-0.063	-0.031	0	0.032
						8	-0.151	-0.106	-0.062	-0.03	0	0.032
						10	-0.148	-0.104	-0.06	-0.03	0	0.032
						12	-0.144	-0.102	-0.06	-0.03	0	0.032
						14	-0.142	-0.101	-0.06	-0.03	0	0.032
						16	-0.139	-0.099	-0.059	-0.029	0	0.032
						18	-0.137	-0.098	-0.059	-0.029	0	0.029
						20	-0.135	-0.097	-0.057	-0.027	0	0.025
						22	-0.131	-0.09	-0.05	-0.021	0	0.02
						24	-0.122	-0.078	-0.039	-0.015	0	0.013
					</tableData>    -->
				</table>
			</product>
		</function>

		<function name="aero/force/Lift_ground_effect">
			<description>Lift_due_ground_effect</description>
			<product>
				<property>aero/qbar-psf</property>
				<property>metrics/Sw-sqft</property>
				<table name="aero/coefficient/CL_ground_effect">
					<independentVar lookup="row">aero/alpha-deg</independentVar>
					<independentVar lookup="column">position/h-agl-ft</independentVar>
					<tableData>
						5.0	10.0	20.0	30.0	40.0	50.0	100.0
						-10	-0.4960	-0.3430	-0.1370	-0.0570	-0.0290	-0.0150	0.0000
						-6	-0.2890	-0.2000	-0.0800	-0.0330	-0.0170	-0.0090	0.0000
						-4	-0.0820	-0.0570	-0.0230	-0.0100	-0.0050	-0.0030	0.0000
						-2	0.0780	0.0560	0.0250	0.0110	0.0060	0.0030	0.0000
						0	0.1860	0.1360	0.0620	0.0270	0.0140	0.0080	0.0000
						2	0.2580	0.1910	0.0920	0.0410	0.0210	0.0120	0.0000
						4	0.3010	0.2220	0.1120	0.0500	0.0250	0.0140	0.0000
						6	0.3220	0.2350	0.1230	0.0550	0.0270	0.0150	0.0000
						8	0.3030	0.2240	0.1230	0.0540	0.0250	0.0130	0.0000
						10	0.2390	0.1790	0.1000	0.0430	0.0180	0.0080	0.0000
						12	0.1630	0.1220	0.0670	0.0270	0.0100	0.0030	0.0000
						14	0.0900	0.0720	0.0390	0.0150	0.0040	0.0000	0.0000
						16	0.0220	0.0250	0.0160	0.0060	0.0020	0.0000	0.0000
					</tableData>
				</table>
			</product>
		</function>

	</axis>

	<axis name="DRAG"><!-- ########################################################### -->

		<function name="aero/force/Drag_alpha">
			<description>Drag_due_to_alpha</description>
			<product>
				<property>aero/qbar-psf</property>
				<property>metrics/Sw-sqft</property>
				<table name="aero/coefficient/CD_alpha">
					<!-- OpenVSP using Peakey wing section -->
					<independentVar lookup="row">aero/alpha-deg</independentVar>
					<tableData>
					-10  0.03565
					-8   0.02877
					-6   0.02462
					-4   0.02326
					-2   0.02471
					0    0.02899
					2    0.03609
					4    0.04603
                    6    0.05874
					8    0.07414
					10   0.09227
					12   0.11283
					14   0.13603
					16   0.16167
					</tableData>
					<!--
					<independentVar lookup="row">aero/alpha-deg</independentVar>
					<independentVar lookup="column">velocities/mach</independentVar> -->
					<!-- using Peakey wing section -->
					<!-- <tableData>
						0.1	0.2	0.3	0.4	0.5	0.6
						-10	0.1260	0.1250	0.1240	0.1240	0.1240	0.1250
						-8	0.0760	0.0750	0.0750	0.0740	0.0750	0.0750
						-6	0.0360	0.0350	0.0350	0.0350	0.0350	0.0350
						-4	0.0190	0.0180	0.0180	0.0180	0.0180	0.0180
						-2	0.0140	0.0130	0.0130	0.0120	0.0120	0.0120
						0	0.0120	0.0120	0.0110	0.0110	0.0110	0.0110
						2	0.0130	0.0130	0.0120	0.0120	0.0120	0.0120
						4	0.0190	0.0180	0.0180	0.0180	0.0180	0.0180
						6	0.0350	0.0340	0.0340	0.0340	0.0340	0.0340
						8	0.0750	0.0740	0.0740	0.0740	0.0740	0.0740
						10	0.1250	0.1240	0.1230	0.1230	0.1230	0.1240
						12	0.1900	0.1890	0.1890	0.1890	0.1890	0.1890
						14	0.2370	0.2360	0.2350	0.2350	0.2360	0.2360
						16	0.3040	0.3020	0.3020	0.3020	0.3020	0.3020
						18	0.3520	0.3500	0.3500	0.3500	0.3500	0.3500
					</tableData> -->
					<!-- using wing section NACA 65 410 -->
					<!--					<tableData>
						0.1	0.2	0.3	0.4	0.5	0.6
						-10	0.0220	0.0210	0.0210	0.0210	0.0210	0.0210
						-8	0.0160	0.0160	0.0150	0.0150	0.0150	0.0150
						-6	0.0150	0.0140	0.0130	0.0130	0.0130	0.0130
						-4	0.0160	0.0150	0.0150	0.0150	0.0150	0.0150
						-2	0.0220	0.0210	0.0200	0.0210	0.0210	0.0210
						0	0.0320	0.0300	0.0300	0.0300	0.0310	0.0310
						2	0.0460	0.0440	0.0440	0.0440	0.0440	0.0450
						4	0.0640	0.0630	0.0620	0.0620	0.0620	0.0630
						6	0.0870	0.0860	0.0850	0.0840	0.0840	0.0840
						8	0.1150	0.1140	0.1100	0.1060	0.1040	0.1020
						10	0.1390	0.1370	0.1310	0.1260	0.1220	0.1190
						12	0.1620	0.1600	0.1510	0.1440	0.1370	0.1320
						14	0.1820	0.1800	0.1680	0.1580	0.1500	0.1490
						16	0.1980	0.1960	0.1820	0.1750	0.1700	0.1610
						18	0.2130	0.2120	0.2010	0.1820	0.1680	0.1670
						20	0.2180	0.2160	0.1900	0.1770	0.1770	0.1810
						22	0.1990	0.1980	0.1890	0.1870	0.1900	0.1990
						24	0.2020	0.2010	0.1980	0.2020	0.2100	0.2210
					</tableData> -->
					<!-- using wing section NACA 65 210 -->
					<!--					<tableData>
						0.1	0.2	0.3	0.4	0.5	0.6
						-10	0.0310	0.0290	0.0290	0.0290	0.0290	0.0300
						-8	0.0220	0.0210	0.0200	0.0200	0.0200	0.0210
						-6	0.0170	0.0160	0.0150	0.0150	0.0150	0.0150
						-4	0.0150	0.0140	0.0140	0.0140	0.0140	0.0140
						-2	0.0170	0.0160	0.0160	0.0160	0.0160	0.0160
						0	0.0230	0.0220	0.0220	0.0220	0.0220	0.0230
						2	0.0330	0.0320	0.0320	0.0320	0.0330	0.0330
						4	0.0470	0.0460	0.0460	0.0460	0.0470	0.0480
						6	0.0660	0.0650	0.0650	0.0650	0.0650	0.0660
						8	0.0890	0.0890	0.0880	0.0860	0.0840	0.0830
						10	0.1140	0.1130	0.1090	0.1050	0.1010	0.0990
						12	0.1360	0.1360	0.1290	0.1230	0.1170	0.1130
						14	0.1570	0.1560	0.1460	0.1380	0.1290	0.1270
						16	0.1750	0.1730	0.1600	0.1530	0.1500	0.1450
						18	0.1900	0.1890	0.1800	0.1690	0.1570	0.1540
						20	0.2110	0.2070	0.1830	0.1700	0.1690	0.1720
						22	0.2000	0.1970	0.1860	0.1840	0.1850	0.1940
						24	0.2040	0.2030	0.1990	0.2020	0.2090	0.2190
					</tableData> -->
				</table>
			</product>
		</function>

		<!--		<function name="aero/force/DragaileronsUp">
			<description>Drag_due_to_aileronsUp</description>
			<product>
				<property>aero/qbar-psf</property>
				<property>metrics/Sw-sqft</property>
				<table name="aero/coefficient/CDaileronsUp">
					<independentVar>aero/alpha-deg</independentVar>
					<tableData>
						-10	0.0007
						-8	0.0003
						-6	0.0000
						-4	-0.0003
						-2	-0.0005
						0	-0.0007
						2	-0.0008
						4	-0.0009
						6	-0.0010
						8	-0.0011
						10	-0.0012
						12	-0.0012
						14	-0.0010
						16	-0.0010
						18	-0.0011
						20	-0.0008
					</tableData>
				</table>
			</product>
		</function> -->


		<!--			<function name="aero/force/Drag_mach">
				<description>Drag_due_to_mach</description>
				<product>
					<property>aero/qbar-psf</property>
					<property>metrics/Sw-sqft</property>
					<table  name="aero/coefficient/CDMach">
						<independentVar lookup="row">velocities/mach</independentVar>
						<tableData>
							0.00      0.000
							0.79      0.000
							1.10      0.023
							1.80      0.015
						</tableData>
					</table>
				</product>
			</function> -->

		<function name="aero/force/Drag_flap">
			<description>Drag_due_to_flaps</description>
			<product>
				<property>aero/qbar-psf</property>
				<property>metrics/Sw-sqft</property>
				<table name="aero/coefficient/CD_Flaps">
					<independentVar lookup="row">aero/alpha-deg</independentVar>
					<independentVar lookup="column">fcs/flap-pos-deg</independentVar>
					<tableData>
						      0	      20	  35	  45
						-10	0.0000 -0.0201 -0.0199 -0.0189
						-8	0.0000 -0.0131 -0.0092 -0.0074
						-6	0.0000 -0.0061	0.0016	0.0041
						-4	0.0000	0.0009	0.0124	0.0156
						-2	0.0000	0.0080	0.0231	0.0271
						0	0.0000	0.0149	0.0339	0.0386
						2	0.0000	0.0220	0.0446	0.0501
						4	0.0000	0.0290	0.0554	0.0616
						6	0.0000	0.0360	0.0661	0.0731
						8	0.0000	0.0430	0.0769	0.0846
						10	0.0000	0.0500	0.0876	0.0961
						12	0.0000	0.0570	0.0984	0.1080
						14	0.0000	0.0640	0.1090	0.1190
						16	0.0000	0.0710	0.1200	0.1310
						18	0.0000	0.0780	0.1310	0.1420
						20	0.0000	0.0850	0.1410	0.1540
						22	0.0000	0.0920	0.1520	0.1650
						24	0.0000	0.0990	0.1630	0.1770
					</tableData>
				</table>
			</product>
		</function>

		<function name="aero/force/Drag_gear">
			<description>Drag_due_to_gear</description>
			<product>
				<property>aero/qbar-psf</property>
				<property>metrics/Sw-sqft</property>
				<property>gear/gear-pos-norm</property>
				<value>0.011</value>
			</product>
		</function>

		<!--			<function name="aero/force/Drag_sspeedbrake">
				<description>Drag_due_to_speedbrakes</description>
				<product>
					<property>aero/qbar-psf</property>
					<property>metrics/Sw-sqft</property>
					<property>fcs/speedbrake-pos-norm</property>
					<value>0.05</value>
				</product>
			</function> -->


		<!--			<function name="aero/force/Drag_sideslip">
				<description>Drag_due_to_sideslip</description>
				<product>
					<property>aero/qbar-psf</property>
					<property>metrics/Sw-sqft</property>
					<table  name="aero/coefficient/CDbeta">
						<independentVar lookup="row">aero/beta-rad</independentVar>
						<tableData>
							-1.57       1.230
							-0.26       0.050
							0.00       0.000
							0.26       0.050
							1.57       1.230
						</tableData>
					</table>
				</product>
			</function> -->

		<function name="aero/force/Drag_Elevator">
			<description>Drag_due_to_Elevator_Deflection</description>
			<product>
				<property>aero/qbar-psf</property>
				<property>metrics/Sw-sqft</property>
				<table name="aero/coefficient/CD_Elevator">
					<independentVar lookup="row">aero/alpha-deg</independentVar>
					<independentVar lookup="column">fcs/elevator-pos-deg</independentVar>
					<tableData>
						-20	-15	-10	-5	0	5	10	15	20
						-10	1.53E-02	1.32E-02	7.82E-03	3.26E-03	-5.20E-06	-1.95E-03	-2.59E-03	-2.01E-03	-1.55E-03
						-8	1.38E-02	1.18E-02	6.87E-03	2.78E-03	-4.25E-06	-1.47E-03	-1.64E-03	-6.18E-04	-1.31E-05
						-6	1.23E-02	1.05E-02	5.93E-03	2.31E-03	-3.31E-06	-1.00E-03	-6.92E-04	7.66E-04	1.52E-03
						-4	1.07E-02	9.09E-03	4.99E-03	1.84E-03	-2.37E-06	-5.34E-04	2.40E-04	2.13E-03	3.03E-03
						-2	9.27E-03	7.76E-03	4.08E-03	1.39E-03	-1.46E-06	-7.92E-05	1.15E-03	3.46E-03	4.51E-03
						0	7.82E-03	6.45E-03	3.19E-03	9.42E-04	-5.72E-07	3.67E-04	2.04E-03	4.77E-03	5.96E-03
						2	6.43E-03	5.20E-03	2.33E-03	5.12E-04	2.87E-07	7.96E-04	2.90E-03	6.03E-03	7.35E-03
						4	5.07E-03	3.97E-03	1.49E-03	9.28E-05	1.13E-06	1.22E-03	3.74E-03	7.26E-03	8.71E-03
						6	3.73E-03	2.76E-03	6.72E-04	-3.18E-04	1.95E-06	1.63E-03	4.56E-03	8.46E-03	1.00E-02
						8	2.40E-03	1.56E-03	-1.48E-04	-7.28E-04	2.77E-06	2.04E-03	5.38E-03	9.66E-03	1.14E-02
						10	9.97E-04	2.93E-04	-1.02E-03	-1.16E-03	3.64E-06	2.47E-03	6.25E-03	1.09E-02	1.28E-02
						12	-6.16E-04	-1.16E-03	-2.01E-03	-1.66E-03	4.63E-06	2.97E-03	7.24E-03	1.24E-02	1.44E-02
						14	-2.40E-03	-2.77E-03	-3.11E-03	-2.21E-03	5.73E-06	3.52E-03	8.34E-03	1.40E-02	1.62E-02
						16	-4.31E-03	-4.49E-03	-4.28E-03	-2.80E-03	6.90E-06	4.11E-03	9.52E-03	1.57E-02	1.81E-02
						18	-6.31E-03	-6.30E-03	-5.52E-03	-3.41E-03	8.14E-06	4.72E-03	1.08E-02	1.75E-02	2.01E-02
						20	-8.53E-03	-8.31E-03	-6.89E-03	-4.10E-03	9.51E-06	5.41E-03	1.21E-02	1.95E-02	2.23E-02
						22	-1.15E-02	-1.10E-02	-8.72E-03	-5.01E-03	1.13E-05	6.32E-03	1.39E-02	2.22E-02	2.53E-02
						24	-1.45E-02	-1.37E-02	-1.05E-02	-5.93E-03	1.32E-05	7.24E-03	1.58E-02	2.49E-02	2.83E-02
</tableData>
				</table>
			</product>
		</function>

		<function name="aero/force/Drag_TailTrim">
			<description>
				Drag due to Tail Trim Deflection
				Positive surface deflection is trailing edge down
</description>
			<product>
				<property>aero/qbar-psf</property>
				<property>metrics/Sw-sqft</property>
				<table name="aero/coefficient/CD_tailplane">
					<independentVar lookup="row">aero/alpha-deg</independentVar>
					<independentVar lookup="column">fcs/pitch-trim-pos-deg</independentVar>
<!--      OpenVSP -->
					<tableData>
						-14		-10		-6		-3		0		3
						-10	0.03242		0.02063		0.01113		0.00497		0	-0.00378
						-8	0.02891		0.01806		0.00949		0.00414		0	-0.00289
						-6	0.02526		0.01533		0.00774		0.00325		0	-0.00197
						-4	0.02134		0.01248		0.00593		0.00232		0	-0.00103
						-2	0.01724		0.00949		0.00405		0.00136		0	-0.00004
						0	0.01299		0.00637		0.0021		0.00038		0	0.00097
						2	0.00859		0.00314		0.00011		-0.00063	0	0.00204
						4	0.00398		-0.00026	-0.00198	-0.00169	0	0.00314
						6	-0.00089	-0.00376	-0.00415	-0.0028		0	0.00427
						8	-0.00584	-0.00735	-0.00639	-0.00388	0	0.00548
						10	-0.01113	-0.01128	-0.00876	-0.00513	0	0.00674
						12	-0.01678	-0.01536	-0.01121	-0.00643	0	0.00812
						14	-0.02247	-0.01938	-0.01376	-0.0076		0	0.00963
						16	-0.02897	-0.02433	-0.01685	-0.00944	0	0.01127
				</tableData>
<!-- Datcom -->
<!--					<tableData>
							-14		-10		-6		-3		0		3
						-10	0.022	0.019	0.012	0.006	0	-0.005
						-8	0.023	0.018	0.011	0.005	0	-0.003
						-6	0.022	0.017	0.01	0.004	0	-0.002
						-4	0.021	0.015	0.008	0.003	0	-0.001
						-2	0.018	0.011	0.005	0.001	0	-0.001
						0	0.015	0.009	0.003	0.001	0	0.001
						2	0.012	0.005	0.001	0.000	0	0.002
						4	0.007	0.001	-0.001	-0.002	0	0.002
						6	0.003	-0.002	-0.003	-0.002	0	0.004
						8	-0.003	-0.005	-0.005	-0.003	0	0.005
						10	-0.008	-0.009	-0.008	-0.005	0	0.006
						12	-0.012	-0.012	-0.009	-0.006	0	0.007
						14	-0.017	-0.016	-0.012	-0.007	0	0.008
						16	-0.023	-0.02	-0.014	-0.008	0	0.008
						18	-0.027	-0.023	-0.016	-0.009	0	0.008
					</tableData>  -->
				</table>
			</product>
		</function>

		<function name="aero/force/Drag_ground_effect">
			<description>Drag_due_ground_effect</description>
			<product>
				<property>aero/qbar-psf</property>
				<property>metrics/Sw-sqft</property>
				<table name="aero/coefficient/CD_ground_effect">
					<independentVar lookup="row">aero/alpha-deg</independentVar>
					<independentVar lookup="column">position/h-agl-ft</independentVar>
					<tableData>
						5.0	10.0	20.0	30.0	40.0	50.0	100.0
						-10	-0.0030	-0.0020	-0.0020	-0.0010	-0.0010	0.0000	0.0000
						-6	-0.0010	0.0000	0.0000	0.0000	0.0000	0.0000	0.0000
						-4	0.0000	0.0000	0.0000	0.0000	0.0000	0.0000	0.0000
						-2	-0.0010	-0.0010	0.0000	0.0000	0.0000	0.0000	0.0000
						0	-0.0030	-0.0020	-0.0010	-0.0010	0.0000	0.0000	0.0000
						2	-0.0080	-0.0060	-0.0040	-0.0030	-0.0020	-0.0010	0.0000
						4	-0.0130	-0.0100	-0.0060	-0.0040	-0.0030	-0.0020	0.0000
						6	-0.0220	-0.0170	-0.0110	-0.0070	-0.0050	-0.0030	0.0000
						8	-0.0340	-0.0270	-0.0170	-0.0110	-0.0080	-0.0050	0.0000
						10	-0.0470	-0.0370	-0.0230	-0.0150	-0.0100	-0.0070	0.0000
						12	-0.0610	-0.0480	-0.0300	-0.0200	-0.0140	-0.0090	0.0000
						14	-0.0690	-0.0550	-0.0340	-0.0220	-0.0150	-0.0100	0.0000
						16	-0.0770	-0.0610	-0.0380	-0.0250	-0.0170	-0.0120	0.0000
</tableData>
				</table>
			</product>
		</function>

	</axis>

	<axis name="PITCH"><!-- ########################################################### -->

		<function name="aero/moment/Pitch_alpha">
			<description>Pitch_moment_due_to_alpha</description>
			<product>
				<property>aero/qbar-psf</property>
				<property>metrics/Sw-sqft</property>
				<property>metrics/cbarw-ft</property>
				<table name="aero/coefficient/CM_Alpha">
					<!-- OpenVSP using Peakey wing section -->
					<independentVar lookup="row">aero/alpha-deg</independentVar>
					<tableData>
					-10	0.22917
					-8	0.18871
					-6	0.14664
					-4	0.10344
					-2	0.05947
					0	0.01521
					2	-0.02828
					4	-0.07159
					6	-0.11392
					8	-0.15445
					10	-0.19444
					12	-0.23272
					14	-0.26846
					16	-0.30312
					</tableData>
<!--					<independentVar lookup="row">aero/alpha-deg</independentVar>
					<independentVar lookup="column">velocities/mach</independentVar>  -->
					<!-- using Peakey wing section  -->
<!--					<tableData>
						0.1	0.2	0.3	0.4	0.5	0.6
						-10	0.2958	0.2959	0.2977	0.3010	0.3067	0.3135
						-8	0.2494	0.2497	0.2513	0.2542	0.2589	0.2647
						-6	0.2004	0.2008	0.2021	0.2044	0.2081	0.2126
						-4	0.1500	0.1503	0.1513	0.1529	0.1554	0.1584
						-2	0.1012	0.1013	0.1019	0.1027	0.1039	0.1054
						0	0.0535	0.0533	0.0534	0.0534	0.0533	0.0532
						2	0.0066	0.0061	0.0057	0.0048	0.0036	0.0017
						4	-0.0399	-0.0407	-0.0416	-0.0433	-0.0457	-0.0492
						6	-0.0852	-0.0863	-0.0877	-0.0900	-0.0936	-0.0986
						8	-0.1272	-0.1287	-0.1302	-0.1328	-0.1371	-0.1430
						10	-0.1631	-0.1647	-0.1660	-0.1689	-0.1738	-0.1807
						12	-0.1942	-0.1960	-0.1972	-0.2002	-0.2056	-0.2131
						14	-0.2217	-0.2239	-0.2251	-0.2276	-0.2333	-0.2416
						</tableData> -->
					<!-- using wing section NACA 65 410 -->
					<!--<tableData>
						0.1	0.2	0.3	0.4	0.5	0.6
						-10	0.1435	0.1428	0.1440	0.1449	0.1464	0.1476
						-8	0.1020	0.1013	0.1022	0.1027	0.1033	0.1036
						-6	0.0602	0.0594	0.0600	0.0599	0.0597	0.0589
						-4	0.0185	0.0175	0.0177	0.0170	0.0158	0.0138
						-2	-0.0215	-0.0228	-0.0230	-0.0244	-0.0266	-0.0298
						0	-0.0594	-0.0608	-0.0617	-0.0639	-0.0671	-0.0718
						2	-0.0961	-0.0978	-0.0993	-0.1023	-0.1067	-0.1128
						4	-0.1325	-0.1347	-0.1368	-0.1407	-0.1463	-0.1540
						6	-0.1661	-0.1685	-0.1717	-0.1769	-0.1842	-0.1937
						8	-0.1970	-0.1998	-0.2042	-0.2108	-0.2200	-0.2320
						10	-0.2247	-0.2275	-0.2344	-0.2438	-0.2557	-0.2691
						12	-0.2557	-0.2588	-0.2668	-0.2775	-0.2912	-0.3059
					</tableData> -->
					<!-- using wing section NACA 65 210 -->
					<!--					 <tableData>
						0.1	0.2	0.3	0.4	0.5	0.6
						-10	0.2650	0.2648	0.2661	0.2681	0.2715	0.2751
						-8	0.2233	0.2234	0.2246	0.2263	0.2292	0.2323
						-6	0.1794	0.1796	0.1808	0.1823	0.1846	0.1872
						-4	0.1352	0.1355	0.1365	0.1376	0.1394	0.1414
						-2	0.0924	0.0927	0.0935	0.0942	0.0953	0.0966
						0	0.0510	0.0513	0.0517	0.0521	0.0526	0.0531
						2	0.0125	0.0126	0.0127	0.0124	0.0120	0.0116
						4	-0.0245	-0.0245	-0.0250	-0.0259	-0.0272	-0.0287
						6	-0.0579	-0.0581	-0.0591	-0.0611	-0.0636	-0.0665
						8	-0.0879	-0.0883	-0.0904	-0.0935	-0.0974	-0.1020
						10	-0.1154	-0.1160	-0.1192	-0.1246	-0.1313	-0.1389
						12	-0.1433	-0.1444	-0.1506	-0.1576	-0.1663	-0.1752
						14	-0.1725	-0.1739	-0.1815	-0.1902	-0.2004	-0.2113
					</tableData> -->
				</table>
			</product>
		</function>

		<!--		<function name="aero/moment/Pitch_aileronUP">
			<description>Pitch_moment_due_to_AileronUP</description>
			<product>
				<property>aero/qbar-psf</property>
				<property>metrics/Sw-sqft</property>
				<property>metrics/cbarw-ft</property>
				<table  name="aero/coefficient/CMaileronUP">
					<independentVar lookup="row">aero/alpha-deg</independentVar>
					<tableData>
						-10	0.0115
						-8	0.0148
						-6	0.0180
						-4	0.0207
						-2	0.0244
						0	0.0277
						2	0.0306
						4	0.0334
						6	0.0362
						8	0.0385
						10	0.0399
						12	0.0418
						14	0.0386
						16	0.0410
						18	0.0407
						20	0.0364
					</tableData>
				</table>
			</product>
		</function> -->

		<function name="aero/moment/Pitch_pitch_rate">
			<description>Pitch_moment_due_to_pitch_rate</description>
			<product>
				<property>aero/qbar-psf</property>
				<property>metrics/Sw-sqft</property>
				<property>metrics/cbarw-ft</property>
				<property>aero/ci2vel</property>
				<property>velocities/q-aero-rad_sec</property>
				<table name="aero/derivative/CMq">
					<independentVar lookup="row">velocities/mach</independentVar>
					<tableData>
						0.1	-16.6900
						0.2	-16.7400
						0.3	-16.8200
						0.4	-16.9300
						0.5	-17.1600
						0.6	-17.3100
</tableData>
				</table>
			</product>
		</function>

		<function name="aero/moment/Pitch_alpha_rate">
			<description>Pitch_moment_due_to_alpha_rate</description>
			<product>
				<property>aero/qbar-psf</property>
				<property>metrics/Sw-sqft</property>
				<property>metrics/cbarw-ft</property>
				<property>aero/ci2vel</property>
				<property>aero/alphadot-rad_sec</property>
				<table name="aero/derivative/CMad">
					<independentVar lookup="row">aero/alpha-deg</independentVar>
					<independentVar lookup="column">velocities/mach</independentVar>
					<tableData>
						0.1	0.2	0.3	0.4	0.5	0.6
						-10	-5.4340	-5.4710	-5.4960	-5.5530	-5.6690	-5.7840
						-8	-5.4480	-5.4880	-5.5220	-5.5900	-5.7200	-5.8490
						-6	-5.5220	-5.5640	-5.6110	-5.6920	-5.8400	-5.9890
						-4	-5.6850	-5.7280	-5.7700	-5.8470	-5.9910	-6.1350
						-2	-5.8730	-5.9140	-5.9450	-6.0100	-6.1400	-6.2700
						0	-6.1130	-6.1520	-6.1630	-6.2060	-6.3120	-6.4140
						2	-6.3600	-6.3970	-6.3830	-6.3980	-6.4740	-6.5400
						4	-6.5310	-6.5660	-6.5330	-6.5020	-6.5230	-6.5330
						6	-6.6180	-6.6450	-6.5540	-6.3960	-6.2690	-6.1320
						8	-6.4080	-6.4130	-6.1470	-5.8080	-5.4760	-5.1420
						10	-5.5990	-5.5740	-5.0770	-4.7080	-4.3580	-4.0640
						12	-4.5140	-4.4880	-4.0210	-3.7010	-3.4460	-3.3530
						14	-3.6710	-3.6550	-3.3150	-3.0590	-2.9820	-3.0220
						16	-3.0360	-3.0020	-2.6380	-2.4220	-2.5420	-2.5790
						18	-2.1370	-2.0420	-1.4330	-0.9918	-0.9352	-1.9010
						20	0.6153	0.6072	0.4161	-0.0590	-0.2677	-1.9930
						22	2.7850	2.5700	1.9660	0.1562	-2.4130	-3.5380
						24	2.8170	2.5450	2.5590	0.5175	-3.9320	-4.7000
</tableData>
				</table>
			</product>
		</function>

		<function name="aero/moment/Pitch_flap">
			<description>Pitch_moment_due_to_flaps</description>
			<product>
				<property>aero/qbar-psf</property>
				<property>metrics/Sw-sqft</property>
				<property>metrics/cbarw-ft</property>
				<table name="aero/coefficient/CMflap">
					<independentVar>fcs/flap-pos-deg</independentVar>
					<!-- from CP 1199 -->
					<tableData>
						0	0
						45	-0.3
</tableData>
					<!-- Datcom -->
					<!--					<tableData>
						0	0
						20	-0.2141
						35	-0.337
						45	-0.3697
					</tableData> -->
				</table>
			</product>
		</function>

		<function name="aero/moment/Pitch_elevator">
			<description>Pitch_moment_due_to_elevator</description>
			<product>
				<property>aero/qbar-psf</property>
				<property>metrics/Sw-sqft</property>
				<property>metrics/cbarw-ft</property>
				<table name="aero/coefficient/CM_Elevator">
					<independentVar lookup="row">fcs/elevator-pos-deg</independentVar>
					<independentVar lookup="column">velocities/mach</independentVar>
					<tableData>
						0.1	0.2	0.3	0.4	0.5	0.6
						-20	0.3359	0.341	0.3385	0.3246	0.2982	0.2545
						-15	0.3023	0.307	0.3048	0.2922	0.2683	0.2287
						-10	0.2061	0.2093	0.2078	0.1992	0.1829	0.1558
						-5	0.103	0.1046	0.1039	0.0996	0.0914	0.0779
						0	-0.000	-0.000	-0.000	-0.000	-0.000	-0.000
						5	-0.103	-0.1046	-0.1039	-0.0996	-0.0914	-0.0779
						10	-0.2061	-0.2093	-0.2078	-0.1992	-0.1829	-0.1558
						15	-0.3023	-0.307	-0.3048	-0.2922	-0.2683	-0.2287
						20	-0.3368	-0.3421	-0.3396	-0.3257	-0.2992	-0.2553
</tableData>
				</table>
			</product>
		</function>

		<function name="aero/moment/Pitch_tailtrim">
			<description>
				Pitch Moment due to Tail Trim Deflection
				Positive surface deflection is trailing edge down
</description>
			<product>
				<property>aero/qbar-psf</property>
				<property>metrics/Sw-sqft</property>
				<property>metrics/cbarw-ft</property>
				<table name="aero/coefficient/CM_tailplane">
					<independentVar lookup="row">aero/alpha-deg</independentVar>
					<independentVar lookup="column">fcs/pitch-trim-pos-deg</independentVar>
<!--      OpenVSP -->
					<tableData>
						-14		-10		-6		-3		0		3
						-10	0.3726	0.26952	0.18075	0.09364	0	-0.10756
						-8	0.39776	0.28764	0.18978	0.09778	0	-0.10689
						-6	0.42149	0.3051	0.19855	0.10176	0	-0.10695
						-4	0.44347	0.32065	0.20613	0.1051	0	-0.10801
						-2	0.46401	0.33515	0.21305	0.10817	0	-0.10998
						0	0.48221	0.34789	0.21888	0.11065	0	-0.11216
						2	0.49759	0.3582	0.22309	0.11201	0	-0.116
						4	0.51079	0.36715	0.22673	0.11367	0	-0.12014
						6	0.52191	0.37422	0.22901	0.11429	0	-0.12414
						8	0.52949	0.37848	0.22937	0.11399	0	-0.13056
						10	0.53548	0.381	0.22959	0.11426	0	-0.13661
						12	0.53903	0.38255	0.22956	0.11362	0	-0.14219
						14	0.53988	0.38164	0.2268	0.11213	0	-0.14888
						16	0.5412	0.37899	0.22423	0.11056	0	-0.15511
				</tableData>
<!-- Datcom -->
<!--					<tableData>
							-14		-10		-6		-3		0		3
						-10	0.3349	0.2983	0.2006	0.1083	0	-0.1032
						-8	0.3845	0.3226	0.2116	0.1091	0	-0.1034
						-6	0.4249	0.3395	0.2171	0.1084	0	-0.1024
						-4	0.4534	0.3521	0.2179	0.1065	0	-0.0995
						-2	0.4738	0.3585	0.2136	0.1038	0	-0.097
						0	0.4875	0.3579	0.2087	0.1011	0	-0.0958
						2	0.4933	0.3522	0.2036	0.0984	0	-0.0971
						4	0.4941	0.3458	0.1997	0.0974	0	-0.1
						6	0.4924	0.3414	0.1988	0.0993	0	-0.1026
						8	0.4843	0.3374	0.1987	0.1004	0	-0.1038
						10	0.4744	0.333	0.1984	0.1006	0	-0.1037
						12	0.4661	0.3297	0.1986	0.0994	0	-0.1024
						14	0.4611	0.3293	0.1981	0.0983	0	-0.0994
					</tableData> -->
				</table>
			</product>
		</function>

		<function name="aero/moment/Pitch_inboard_spoiler">
			<description>Pitch_moment_due_to_inboard_spoiler</description>
			<product>
				<property>aero/qbar-psf</property>
				<property>metrics/Sw-sqft</property>
				<property>metrics/cbarw-ft</property>
				<property>fcs/speedbrake-pos-norm</property>
				<table name="aero/derivative/CM_inner_spoiler">
					<independentVar>velocities/mach</independentVar>
					<tableData>
						0.0000    -0.06
						0.6000    -0.02
</tableData>
				</table>
			</product>
		</function>

		<function name="aero/moment/Pitch_middle_spoiler">
			<description>Pitch_moment_due_to_middle_spoiler</description>
			<product>
				<property>aero/qbar-psf</property>
				<property>metrics/Sw-sqft</property>
				<property>metrics/cbarw-ft</property>
				<property>fcs/speedbrake-pos-norm</property>
				<table name="aero/derivative/CM_middle_spoiler">
					<independentVar>velocities/mach</independentVar>
					<tableData>
						0.0000    -0.06
						0.6000    -0.02
</tableData>
				</table>
			</product>
		</function>

		<function name="aero/moment/Pitch_outboard_spoiler">
			<description>Pitch_moment_due_to_outboard_spoiler</description>
			<product>
				<property>aero/qbar-psf</property>
				<property>metrics/Sw-sqft</property>
				<property>metrics/cbarw-ft</property>
				<property>fcs/speedbrake-pos-norm</property>
				<table name="aero/derivative/CM_outerSpoiler">
					<independentVar>velocities/mach</independentVar>
					<tableData>
						0.0000    -0.06
						0.6000    -0.02
</tableData>
				</table>
			</product>
		</function>

		<function name="aero/moment/Pitch_ground_effect">
			<description>Pitch Moment_due_ground_effect</description>
			<product>
				<property>aero/qbar-psf</property>
				<property>metrics/Sw-sqft</property>
				<property>metrics/cbarw-ft</property>
				<table name="aero/coefficient/CM_ground_effect">
					<independentVar lookup="row">aero/alpha-deg</independentVar>
					<independentVar lookup="column">position/h-agl-ft</independentVar>
					<tableData>
						5.0	10.0	20.0	30.0	40.0	50.0	100
						-10	-0.0186	-0.0129	-0.0052	-0.0022	-0.0011	-0.0006	0.0000
						-6	-0.0109	-0.0075	-0.0030	-0.0013	-0.0007	-0.0004	0.0000
						-4	-0.0031	-0.0021	-0.0009	-0.0004	-0.0002	-0.0001	0.0000
						-2	0.0029	0.0021	0.0009	0.0004	0.0002	0.0001	0.0000
						0	0.0070	0.0051	0.0024	0.0010	0.0006	0.0003	0.0000
						2	0.0097	0.0072	0.0035	0.0016	0.0008	0.0005	0.0000
						4	0.0113	0.0083	0.0042	0.0019	0.0010	0.0005	0.0000
						6	0.0120	0.0088	0.0046	0.0020	0.0010	0.0005	0.0000
						8	0.0113	0.0084	0.0046	0.0020	0.0009	0.0005	0.0000
						10	0.0089	0.0067	0.0037	0.0016	0.0006	0.0002	0.0000
						12	0.0061	0.0046	0.0025	0.0010	0.0003	0.0001	0.0000
						14	0.0034	0.0027	0.0015	0.0006	0.0002	0.0000	0.0000
						16	0.0008	0.0009	0.0006	0.0002	0.0000	-0.0001	0.0000
</tableData>
				</table>
			</product>
		</function>

	</axis>


	<axis name="SIDE"><!-- ########################################################### -->

		<function name="aero/force/Side_sideslip">
			<description>Side_force_due_to_beta</description>
			<product>
				<property>aero/qbar-psf</property>
				<property>metrics/Sw-sqft</property>
				<property>aero/beta-rad</property>
				<table name="aero/derivative/Cyb">
					<independentVar lookup="row">velocities/mach</independentVar>
					<tableData>
						0.1	-0.5535
						0.2	-0.5553
						0.3	-0.5584
						0.4	-0.5630
						0.5	-0.5691
						0.6	-0.5772
</tableData>
				</table>
			</product>
		</function>

		<function name="aero/force/Side_rollrate">
			<description>Side_force_due_to_Roll Rate (per radian)</description>
			<product>
				<property>aero/qbar-psf</property>
				<property>metrics/Sw-sqft</property>
				<property>aero/bi2vel</property>
				<property>velocities/p-aero-rad_sec</property>
				<table name="aero/derivative/Cyp">
					<independentVar lookup="row">aero/alpha-deg</independentVar>
					<independentVar lookup="column">velocities/mach</independentVar>
					<tableData>
						0.1	0.2	0.3	0.4	0.5	0.6
						-10	-0.1678	-0.1685	-0.1697	-0.1715	-0.1740	-0.1772
						-8	-0.1308	-0.1315	-0.1326	-0.1343	-0.1366	-0.1393
						-6	-0.0942	-0.0947	-0.0956	-0.0970	-0.0989	-0.1010
						-4	-0.0576	-0.0580	-0.0586	-0.0596	-0.0610	-0.0625
						-2	-0.0196	-0.0198	-0.0203	-0.0211	-0.0221	-0.0230
						0	0.0195	0.0194	0.0189	0.0182	0.0174	0.0169
						2	0.0593	0.0593	0.0587	0.0580	0.0573	0.0571
						4	0.0996	0.0997	0.0989	0.0981	0.0974	0.0972
						6	0.1401	0.1402	0.1391	0.1388	0.1388	0.1395
						8	0.1823	0.1827	0.1826	0.1802	0.1777	0.1761
						10	0.2231	0.2231	0.2196	0.2151	0.2105	0.2069
						12	0.2571	0.2570	0.2505	0.2440	0.2375	0.2291
						14	0.2853	0.2850	0.2764	0.2642	0.2482	0.2431
						16	0.3070	0.3058	0.2871	0.2777	0.2757	0.2670
						18	0.3141	0.3158	0.3240	0.3332	0.3021	0.2709
						20	0.6229	0.6937	0.3235	0.5009	0.2858	0.2612
						22	0.1994	0.1933	0.1356	0.3020	0.2612	0.2621
						24	0.1900	0.1852	0.1160	0.2881	0.2545	0.2647
</tableData>
				</table>
			</product>
		</function>

		<function name="aero/force/Side_rudder">
			<description>Side force due to rudder (DATCOM does not calculate)</description>
			<product>
				<property>aero/qbar-psf</property>
				<property>metrics/Sw-sqft</property>
				<property>fcs/rudder-pos-rad</property>
				<value>-0.1</value>
			</product>
		</function>

	</axis>


	<axis name="ROLL"><!-- ########################################################### -->

		<function name="aero/momment/Roll_beta">
			<description>Roll_moment_due_to_beta (per radian)</description>
			<product>
				<property>aero/qbar-psf</property>
				<property>metrics/Sw-sqft</property>
				<property>metrics/bw-ft</property>
				<property>aero/beta-rad</property>
				<table name="aero/derivative/Clb">
					<independentVar lookup="row">aero/alpha-deg</independentVar>
					<independentVar lookup="column">velocities/mach</independentVar>
					<tableData>
						0.1	0.2	0.3	0.4	0.5	0.6
						-10	-0.0072	-0.0079	-0.0081	-0.0078	-0.0068	-0.0049
						-8	-0.0360	-0.0305	-0.0309	-0.0310	-0.0308	-0.0302
						-6	-0.0516	-0.0524	-0.0532	-0.0539	-0.0546	-0.0554
						-4	-0.0730	-0.0739	-0.0751	-0.0764	-0.0781	-0.0805
						-2	-0.0949	-0.0960	-0.0974	-0.0993	-0.1020	-0.1059
						0	-0.1175	-0.1186	-0.1203	-0.1226	-0.1261	-0.1313
						2	-0.1405	-0.1417	-0.1435	-0.1461	-0.1502	-0.1566
						4	-0.1639	-0.1651	-0.1669	-0.1697	-0.1743	-0.1816
						6	-0.1876	-0.1890	-0.1907	-0.1935	-0.1984	-0.2063
						8	-0.2116	-0.2129	-0.2143	-0.2155	-0.2187	-0.2252
						10	-0.2321	-0.2331	-0.2318	-0.2313	-0.2328	-0.2380
						12	-0.2369	-0.2465	-0.2359	-0.2340	-0.2336	-0.2370
						14	-0.2435	-0.2542	-0.2404	-0.2362	-0.2335	-0.2380
						16	-0.2444	-0.2561	-0.2385	-0.2346	-0.2355	-0.2382
						18	-0.2399	-0.2527	-0.2366	-0.2302	-0.2245	-0.2276
						20	-0.2349	-0.2475	-0.2196	-0.2091	-0.2099	-0.2185
						22	-0.2044	-0.2182	-0.1942	-0.1925	-0.1980	-0.2128
						24	-0.1742	-0.1910	-0.1738	-0.1792	-0.1901	-0.2071
</tableData>
				</table>
			</product>
		</function>

		<function name="aero/moment/Roll_rollrate">
			<description>Roll_moment_due_to_roll_rate</description>
			<product>
				<property>aero/qbar-psf</property>
				<property>metrics/Sw-sqft</property>
				<property>metrics/bw-ft</property>
				<property>aero/bi2vel</property>
				<property>velocities/p-aero-rad_sec</property>
				<table name="aero/derivative/Clp">
					<independentVar lookup="row">aero/alpha-deg</independentVar>
					<independentVar lookup="column">velocities/mach</independentVar>
					<tableData>
						0.1	0.2	0.3	0.4	0.5	0.6
						-10	-0.4349	-0.4369	-0.4375	-0.4405	-0.4455	-0.4512
						-8	-0.4176	-0.4199	-0.4224	-0.4275	-0.4348	-0.4429
						-6	-0.4055	-0.4077	-0.4118	-0.4184	-0.4276	-0.4374
						-4	-0.4107	-0.4129	-0.4164	-0.4223	-0.4307	-0.4397
						-2	-0.4286	-0.4306	-0.4320	-0.4357	-0.4414	-0.4475
						0	-0.4453	-0.4470	-0.4463	-0.4477	-0.4508	-0.4540
						2	-0.4599	-0.4613	-0.4585	-0.4577	-0.4583	-0.4589
						4	-0.4721	-0.4734	-0.4686	-0.4656	-0.4637	-0.4619
						6	-0.4819	-0.4830	-0.4764	-0.4534	-0.4282	-0.4046
						8	-0.4525	-0.4503	-0.4141	-0.3773	-0.3389	-0.3034
						10	-0.3632	-0.3593	-0.3088	-0.2751	-0.2419	-0.2119
						12	-0.2663	-0.2640	-0.2243	-0.1845	-0.1429	-0.1438
						14	-0.1774	-0.1741	-0.1270	-0.1134	-0.1356	-0.1305
						16	-0.0885	-0.0904	-0.0961	-0.0731	-0.0389	-0.0319
						18	-0.0613	-0.0487	0.0478	0.1156	0.1022	0.0252
						20	0.2091	0.2143	0.2934	0.1892	0.0761	-0.0415
						22	0.4450	0.4160	0.2683	0.0988	0.0127	-0.0639
						24	0.3089	0.2558	0.1426	0.0776	-0.0668	-0.0726
</tableData>
				</table>
			</product>
		</function>

		<function name="aero/moment/Roll_yawrate">
			<description>Roll_moment_due_to_yaw_rate</description>
			<product>
				<property>aero/qbar-psf</property>
				<property>metrics/Sw-sqft</property>
				<property>metrics/bw-ft</property>
				<property>aero/bi2vel</property>
				<property>velocities/r-aero-rad_sec</property>
				<table name="aero/derivative/Clr">
					<independentVar lookup="row">aero/alpha-deg</independentVar>
					<independentVar lookup="column">velocities/mach</independentVar>
					<tableData>
						0.1	0.2	0.3	0.4	0.5	0.6
						-10	0.0069	0.0061	0.0044	0.0018	-0.0019	-0.0080
						-8	0.0317	0.0314	0.0307	0.0297	0.0281	0.0252
						-6	0.0568	0.0570	0.0573	0.0578	0.0584	0.0589
						-4	0.0832	0.0839	0.0851	0.0869	0.0895	0.0931
						-2	0.1115	0.1126	0.1145	0.1175	0.1218	0.1283
						0	0.1400	0.1418	0.1442	0.1482	0.1543	0.1635
						2	0.1688	0.1710	0.1739	0.1790	0.1867	0.1985
						4	0.1975	0.2002	0.2037	0.2096	0.2187	0.2331
						6	0.2261	0.2293	0.2331	0.2418	0.2545	0.2730
						8	0.2597	0.2638	0.2718	0.2796	0.2911	0.3088
						10	0.2981	0.3023	0.3078	0.3137	0.3232	0.3391
						12	0.3323	0.3362	0.3379	0.3428	0.3516	0.3586
						14	0.3621	0.3661	0.3668	0.3620	0.3514	0.3640
						16	0.3874	0.3897	0.3716	0.3722	0.3874	0.3954
						18	0.3898	0.3973	0.4196	0.4285	0.4104	0.3939
						20	0.4852	0.4866	0.4772	0.4172	0.3838	0.3635
						22	0.5211	0.5103	0.4321	0.3663	0.3453	0.3495
						24	0.4267	0.4082	0.3548	0.3411	0.3042	0.3404
</tableData>
				</table>
			</product>
		</function>

		<function name="aero/moment/Roll_aileron">
			<description>Roll_moment_due_to_aileron</description>
			<product>
				<property>aero/qbar-psf</property>
				<property>metrics/Sw-sqft</property>
				<property>metrics/bw-ft</property>
				<property>fcs/aileron-pos-rad</property>
				<table name="aero/derivative/ClAileron">
					<independentVar lookup="row">velocities/mach</independentVar>
					<tableData>
						0.0    0.100
						2.0    0.033
</tableData>
				</table>
			</product>
		</function>

		<function name="aero/moment/Roll_rudder">
			<description>Roll_moment_due_to_rudder (DATCOM does not calculate)</description>
			<product>
				<property>aero/qbar-psf</property>
				<property>metrics/Sw-sqft</property>
				<property>metrics/bw-ft</property>
				<property>fcs/rudder-pos-rad</property>
				<value>0.008</value>
			</product>
		</function>

	</axis>
	<axis name="YAW"><!-- ########################################################### -->

		<function name="aero/moment/Yaw_sideslip">
			<description>Yaw_moment_due_to_beta</description>
			<product>
				<property>aero/qbar-psf</property>
				<property>metrics/Sw-sqft</property>
				<property>metrics/bw-ft</property>
				<property>aero/beta-rad</property>
				<table name="aero/derivative/CNb">
					<independentVar lookup="row">aero/alpha-deg</independentVar>
					<independentVar lookup="column">velocities/mach</independentVar>
					<tableData>
						0.1	0.2	0.3	0.4	0.5	0.6
						-10	0.0472	0.0414	0.0385	0.0372	0.0367	0.0371
						-8	0.0498	0.0440	0.0412	0.0399	0.0397	0.0403
						-6	0.0509	0.0451	0.0423	0.0411	0.0409	0.0417
						-4	0.0504	0.0446	0.0419	0.0407	0.0405	0.0414
						-2	0.0486	0.0427	0.0400	0.0387	0.0386	0.0394
						0	0.0452	0.0394	0.0366	0.0352	0.0350	0.0357
						2	0.0403	0.0344	0.0316	0.0302	0.0298	0.0303
						4	0.0339	0.0279	0.0250	0.0235	0.0229	0.0231
						6	0.0257	0.0197	0.0167	0.0151	0.0143	0.0142
						8	0.0159	0.0098	0.0068	0.0053	0.0046	0.0044
						10	0.0050	-0.0011	-0.0038	-0.0050	-0.0055	-0.0057
						12	-0.0061	-0.0123	-0.0144	-0.0153	-0.0154	-0.0155
						14	-0.0169	-0.0230	-0.0245	-0.0247	-0.0242	-0.0247
						16	-0.0266	-0.0327	-0.0332	-0.0334	-0.0339	-0.0340
						18	-0.0349	-0.0411	-0.0421	-0.0413	-0.0396	-0.0400
						20	-0.0430	-0.0486	-0.0456	-0.0430	-0.0435	-0.0460
						22	-0.0406	-0.0462	-0.0445	-0.0451	-0.0475	-0.0529
						24	-0.0363	-0.0426	-0.0440	-0.0476	-0.0527	-0.0596
</tableData>
				</table>
			</product>
		</function>

		<function name="aero/moment/Yaw_rollrate">
			<description>Yaw_moment_due_to_roll_rate</description>
			<product>
				<property>aero/qbar-psf</property>
				<property>metrics/Sw-sqft</property>
				<property>metrics/bw-ft</property>
				<property>aero/bi2vel</property>
				<property>velocities/p-aero-rad_sec</property>
				<table name="aero/derivative/CNp">
					<independentVar lookup="row">aero/alpha-deg</independentVar>
					<independentVar lookup="column">velocities/mach</independentVar>
					<tableData>
						0.1	0.2	0.3	0.4	0.5	0.6
						-10	0.1059	0.1063	0.1065	0.1071	0.1080	0.1092
						-8	0.0748	0.0751	0.0756	0.0764	0.0775	0.0788
						-6	0.0458	0.0460	0.0465	0.0472	0.0482	0.0493
						-4	0.0191	0.0192	0.0195	0.0198	0.0204	0.0209
						-2	-0.0077	-0.0077	-0.0077	-0.0076	-0.0075	-0.0075
						0	-0.0359	-0.0360	-0.0360	-0.0361	-0.0362	-0.0365
						2	-0.0653	-0.0654	-0.0654	-0.0654	-0.0656	-0.0658
						4	-0.0956	-0.0958	-0.0955	-0.0953	-0.0953	-0.0954
						6	-0.1267	-0.1269	-0.1262	-0.1250	-0.1238	-0.1228
						8	-0.1560	-0.1561	-0.1530	-0.1486	-0.1438	-0.1394
						10	-0.1760	-0.1756	-0.1675	-0.1607	-0.1538	-0.1476
						12	-0.1854	-0.1849	-0.1749	-0.1645	-0.1533	-0.1489
						14	-0.1862	-0.1854	-0.1705	-0.1610	-0.1577	-0.1535
						16	-0.1762	-0.1760	-0.1681	-0.1566	-0.1453	-0.1380
						18	-0.1705	-0.1670	-0.1355	-0.1065	-0.0981	-0.1160
						20	-0.0756	-0.0647	-0.1217	-0.0305	-0.0935	-0.1328
						22	0.0081	-0.0013	-0.0425	-0.0725	-0.1071	-0.1402
						24	0.0052	-0.0143	-0.0521	-0.0681	-0.1378	-0.1444
					</tableData>
				</table>
			</product>
		</function>

		<function name="aero/moment/Yaw_yawrate">
			<description>Yaw_moment_due_to_yaw_rate</description>
			<product>
				<property>aero/qbar-psf</property>
				<property>metrics/Sw-sqft</property>
				<property>metrics/bw-ft</property>
				<property>aero/bi2vel</property>
				<property>velocities/r-aero-rad_sec</property>
				<table name="aero/derivative/CNr">
					<independentVar lookup="row">aero/alpha-deg</independentVar>
					<independentVar lookup="column">velocities/mach</independentVar>
					<tableData>
						0.1	0.2	0.3	0.4	0.5	0.6
						-10	-0.0816	-0.0815	-0.0815	-0.0818	-0.0821	-0.0824
						-8	-0.0824	-0.0823	-0.0826	-0.0832	-0.0839	-0.0849
						-6	-0.0830	-0.0830	-0.0834	-0.0842	-0.0852	-0.0866
						-4	-0.0834	-0.0834	-0.0839	-0.0847	-0.0859	-0.0876
						-2	-0.0835	-0.0835	-0.0840	-0.0848	-0.0860	-0.0877
						0	-0.0831	-0.0831	-0.0836	-0.0843	-0.0854	-0.0869
						2	-0.0824	-0.0823	-0.0826	-0.0832	-0.0841	-0.0852
						4	-0.0812	-0.0811	-0.0813	-0.0816	-0.0821	-0.0827
						6	-0.0798	-0.0795	-0.0795	-0.0794	-0.0793	-0.0791
						8	-0.0777	-0.0773	-0.0767	-0.0760	-0.0751	-0.0739
						10	-0.0740	-0.0733	-0.0720	-0.0708	-0.0692	-0.0672
						12	-0.0684	-0.0675	-0.0658	-0.0638	-0.0614	-0.0594
						14	-0.0608	-0.0597	-0.0571	-0.0557	-0.0554	-0.0525
						16	-0.0507	-0.0497	-0.0499	-0.0474	-0.0430	-0.0395
						18	-0.0425	-0.0403	-0.0316	-0.0248	-0.0250	-0.0288
						20	-0.0012	0.0031	-0.0268	0.0007	-0.0203	-0.0285
						22	0.0243	0.0210	-0.0012	-0.0126	-0.0225	-0.0252
						24	0.0170	0.0104	-0.0076	-0.0096	-0.0313	-0.0208
					</tableData>
				</table>
			</product>
		</function>


		<function name="aero/moment/Yaw_rudder">
			<description>Yaw_moment_due_to_rudder (DATCOM does not calculate)</description>
			<product>
				<property>aero/qbar-psf</property>
				<property>metrics/Sw-sqft</property>
				<property>metrics/bw-ft</property>
				<property>fcs/rudder-pos-rad</property>
				<value>-0.04</value>
			</product>
		</function>

		<function name="aero/moment/Yaw_aileron">
			<description>Yaw_moment_due_to_aileron</description>
			<product>
				<property>aero/qbar-psf</property>
				<property>metrics/Sw-sqft</property>
				<property>metrics/bw-ft</property>
				<property>fcs/aileron-pos-rad</property>
				<value>0</value>
			</product>
		</function>

	</axis>

</aerodynamics>
